# OpenSim document version 40600
Model optimized_scale_and_markers:
  gravity: 0 -9.80665 0
  length_units: meters
  force_units: N
  credits:
    Rajagopal, A, Dembia, C.L., DeMers, M.S., Delp, D.D., Hicks, J.L., and Delp, S.L.
  publications:
    Rajagopal, Apoorva, et al. "Full-Body Musculoskeletal Model for Muscle-Driven Simulation of Human Gait." IEEE Transactions on Biomedical Engineering 63.10 (2016): 2068-2079. (2016)
  Ground
  BodySet:
    Body pelvis: mass=8.650081 [kg] mass_center=(-0.0707 0 0) inertia=(0.0755055 0.06397402 0.04252693 0 0 0)
        meshes=(r_pelvis.vtp l_pelvis.vtp sacrum.vtp)
      WrapCylinder Gmax1_at_pelvis_r: xyz_body_rotation=(-0.6 0.45 0) translation=(-0.07721285 -0.09699908 0.0591117)
          quadrant=-x radius=0.03946963 length=0.1467426
      WrapCylinder Gmax2_at_pelvis_r: xyz_body_rotation=(-0.75 0.39 0) translation=(-0.08022114 -0.08132246 0.06589502)
          quadrant=all radius=0.03946953 length=0.09782536
      WrapCylinder Gmax3_at_pelvis_r: xyz_body_rotation=(-0.1 0 0) translation=(-0.08322943 -0.0862214 0.06589502)
          quadrant=all radius=0.03964893 length=0.0969152
      WrapCylinder Gmax1_at_pelvis_l: xyz_body_rotation=(0.6 -0.45 0) translation=(-0.07721285 -0.09699908 -0.0591117)
          quadrant=-x radius=0.03946963 length=0.1467426
      WrapCylinder Gmax2_at_pelvis_l: xyz_body_rotation=(0.75 -0.39 0)
          translation=(-0.08022114 -0.08132246 -0.06589502) quadrant=all radius=0.03946953 length=0.09782536
      WrapCylinder Gmax3_at_pelvis_l: xyz_body_rotation=(0.1 0 0) translation=(-0.08322943 -0.0862214 -0.06589502)
          quadrant=all radius=0.03964893 length=0.0969152
      WrapCylinder PS_at_brim_r: xyz_body_rotation=(-0.25 -0.27 0.1) translation=(-0.07420455 -0.05878732 0.06356931)
          quadrant=-y radius=0.04948961 length=0.09720946
      WrapCylinder PS_at_brim_l: xyz_body_rotation=(0.25 0.27 0.1) translation=(-0.07420455 -0.05878732 -0.06356931)
          quadrant=-y radius=0.04948961 length=0.09720946
      WrapCylinder IL_at_brim_r: xyz_body_rotation=(-0.32 -0.24 0.9) translation=(-0.07119626 -0.06368626 0.07325975)
          quadrant=-y radius=0.05434551 length=0.09719869
      WrapCylinder IL_at_brim_l: xyz_body_rotation=(0.32 0.24 0.9) translation=(-0.07119626 -0.06368626 -0.07325975)
          quadrant=-y radius=0.05434551 length=0.09719869
    Body femur_r: mass=6.831779 mass_center=(0 -0.17 0) inertia=(0.09834812 0.02578057 0.1037099 0 0 0)
        meshes=r_femur.vtp
      WrapCylinder Gastroc_at_condyles_r: translation=(0.00517907 -0.4315372 0) quadrant=all radius=0.0261043
          length=0.1162611
      WrapCylinder KnExt_at_fem_r: xyz_body_rotation=(-0.0623366 0.0507601 0)
          translation=(0.00371679 -0.4238874 0.002431146) quadrant=all radius=0.02611423 length=0.1161896
      WrapCylinder AB_at_femshaft_r: xyz_body_rotation=(1.66157 0.186644 0)
          translation=(0.01516784 -0.1185096 0.02716439) quadrant=all radius=0.01813495 length=0.07370145
      WrapCylinder AL_at_femshaft_r: xyz_body_rotation=(1.77711 0.136489 0)
          translation=(0.03183336 -0.2440911 0.01757135) quadrant=all radius=0.02205391 length=0.1056984
      WrapCylinder AMprox_at_femshaft_r: xyz_body_rotation=(1.61126 0.18656 0)
          translation=(0.005368613 -0.07672395 0.02953379) quadrant=all radius=0.02319775 length=0.07364996
      WrapCylinder AMmid_at_femshaft_r: xyz_body_rotation=(1.61139 0.13656 0)
          translation=(0.02383667 -0.1691531 0.02393141) quadrant=all radius=0.02352467 length=0.1262892
      WrapCylinder AMdist_at_femshaft_r: xyz_body_rotation=(1.71188 0.186636 0)
          translation=(0.03273845 -0.2744324 0.01088738) quadrant=all radius=0.0239474 length=0.2108338
      WrapCylinder AMisch_at_condyles_r: xyz_body_rotation=(1.71115 -0.463363 0)
          translation=(-0.02346232 -0.3966259 -0.003667304) quadrant=all radius=0.0440038 length=0.2522472
      WrapCylinder PECT_at_femshaft_r: xyz_body_rotation=(1.81295 0.276344 0)
          translation=(0.006303684 -0.08894182 0.03539045) quadrant=all radius=0.01645602 length=0.05287244
    Body tibia_r: mass=2.723119 mass_center=(0 -0.1867 0) inertia=(0.03701826 0.003745895 0.0375324 0 0 0)
        meshes=(r_tibia.vtp r_fibula.vtp)
      WrapCylinder GasLat_at_shank_r: xyz_body_rotation=(2.96723 -0.279725 -1.47812)
          translation=(-0.007042004 -0.0717744 -0.003723839) quadrant=-y radius=0.05337476 length=0.1111794
      WrapCylinder GasMed_at_shank_r: xyz_body_rotation=(2.96723 0.0279725 -1.47812)
          translation=(-0.007042004 -0.0717744 -0.003723839) quadrant=-y radius=0.05298833 length=0.1123867
      WrapCylinder GR_at_condyles_r: xyz_body_rotation=(0 -0.4 0) translation=(-0.002854867 -0.01939849 0) quadrant=all
          radius=0.03510743 length=0.1103447
      WrapCylinder SM_at_condyles_r: xyz_body_rotation=(0 -0.1 0) translation=(-0.0009516222 -0.01939849 0)
          quadrant=all radius=0.03385308 length=0.1126811
      WrapCylinder ST_at_condyles_r: xyz_body_rotation=(0 -0.2 0) translation=(-0.001903244 -0.01988345 0) quadrant=all
          radius=0.04099429 length=0.1121986
      WrapCylinder BF_at_gastroc_r: translation=(-0.05519409 -0.05819546 0) quadrant=y radius=0.0288232
          length=0.1692654
    Body patella_r: mass=0.05916089 mass_center=(0.0018 0.0264 0) inertia=(1.969742e-6 8.997672e-6 8.997672e-6 0 0 0)
        meshes=r_patella.vtp
    Body talus_r: mass=0.07344893 mass_center=(0 0 0) inertia=(0.0007344893 0.0007344893 0.0007344893 0 0 0)
        meshes=r_talus.vtp
    Body calcn_r: mass=0.9181116 mass_center=(0.1 0.03 0) inertia=(0.001028285 0.002864508 0.003011406 0 0 0)
        meshes=r_foot.vtp
    Body toes_r: mass=0.1590904 mass_center=(0.0346 0.006 -0.0175)
        inertia=(0.0004630955 0.0005365444 0.0007344893 0 0 0) meshes=r_bofoot.vtp
    Body femur_l: mass=6.831779 mass_center=(0 -0.17 0) inertia=(0.09834812 0.02578057 0.1037099 0 0 0)
        meshes=l_femur.vtp
      WrapCylinder Gastroc_at_condyles_l: translation=(0.00517907 -0.4315372 0) quadrant=all radius=0.0261043
          length=0.1162611
      WrapCylinder KnExt_at_fem_l: xyz_body_rotation=(0.0623366 -0.0507601 0)
          translation=(0.00371679 -0.4238874 -0.002431146) quadrant=all radius=0.02611423 length=0.1161896
      WrapCylinder AB_at_femshaft_l: xyz_body_rotation=(-1.66157 -0.186644 0)
          translation=(0.01516784 -0.1185096 -0.02716439) quadrant=all radius=0.01813495 length=0.07370145
      WrapCylinder AL_at_femshaft_l: xyz_body_rotation=(-1.77711 -0.136489 0)
          translation=(0.03183336 -0.2440911 -0.01757135) quadrant=all radius=0.02205391 length=0.1056984
      WrapCylinder AMprox_at_femshaft_l: xyz_body_rotation=(-1.61126 -0.18656 0)
          translation=(0.005368613 -0.07672395 -0.02953379) quadrant=all radius=0.02319775 length=0.07364996
      WrapCylinder AMmid_at_femshaft_l: xyz_body_rotation=(-1.61139 -0.13656 0)
          translation=(0.02383667 -0.1691531 -0.02393141) quadrant=all radius=0.02352467 length=0.1262892
      WrapCylinder AMdist_at_femshaft_l: xyz_body_rotation=(-1.71188 -0.186636 0)
          translation=(0.03273845 -0.2744324 -0.01088738) quadrant=all radius=0.0239474 length=0.2108338
      WrapCylinder AMisch_at_condyles_l: xyz_body_rotation=(-1.71115 0.463363 0)
          translation=(-0.02346232 -0.3966259 0.003667304) quadrant=all radius=0.0440038 length=0.2522472
      WrapCylinder PECT_at_femshaft_l: xyz_body_rotation=(-1.81295 -0.276344 0)
          translation=(0.006303684 -0.08894182 -0.03539045) quadrant=all radius=0.01645602 length=0.05287244
    Body tibia_l: mass=2.723119 mass_center=(0 -0.1867 0) inertia=(0.03701826 0.003745895 0.0375324 0 0 0)
        meshes=(l_tibia.vtp l_fibula.vtp)
      WrapCylinder GasLat_at_shank_l: xyz_body_rotation=(-2.96723 0.279725 -1.47812)
          translation=(-0.007042004 -0.0717744 0.003723839) quadrant=-y radius=0.05337476 length=0.1111794
      WrapCylinder GasMed_at_shank_l: xyz_body_rotation=(-2.96723 -0.0279725 -1.47812)
          translation=(-0.007042004 -0.0717744 0.003723839) quadrant=-y radius=0.05298833 length=0.1123867
      WrapCylinder GR_at_condyles_l: xyz_body_rotation=(0 0.4 0) translation=(-0.002854867 -0.01939849 0) quadrant=all
          radius=0.03510743 length=0.1103447
      WrapCylinder SM_at_condyles_l: xyz_body_rotation=(0 0.1 0) translation=(-0.0009516222 -0.01939849 0) quadrant=all
          radius=0.03385308 length=0.1126811
      WrapCylinder ST_at_condyles_l: xyz_body_rotation=(0 0.2 0) translation=(-0.001903244 -0.01988345 0) quadrant=all
          radius=0.04099429 length=0.1121986
      WrapCylinder BF_at_gastroc_l: translation=(-0.05519409 -0.05819546 0) quadrant=all radius=0.0288232
          length=0.1692654
    Body patella_l: mass=0.05916089 mass_center=(0.0018 0.0264 0) inertia=(1.969742e-6 8.997672e-6 8.997672e-6 0 0 0)
        meshes=l_patella.vtp
    Body talus_l: mass=0.07344893 mass_center=(0 0 0) inertia=(0.0007344893 0.0007344893 0.0007344893 0 0 0)
        meshes=l_talus.vtp
    Body calcn_l: mass=0.9181116 mass_center=(0.1 0.03 0) inertia=(0.001028285 0.002864508 0.003011406 0 0 0)
        meshes=l_foot.vtp
    Body toes_l: mass=0.1590904 mass_center=(0.0346 0.006 -0.0175)
        inertia=(0.0004630955 0.0005365444 0.0007344893 0 0 0) meshes=l_bofoot.vtp
    Body torso: mass=19.70385 mass_center=(-0.03 0.32 0) inertia=(1.083004 0.5549067 1.051348 0 0 0)
        meshes=(hat_spine.vtp hat_jaw.vtp hat_skull.vtp hat_ribs_scap.vtp)
    Body humerus_r: mass=1.49285 mass_center=(0 -0.164502 0) inertia=(0.008774209 0.00302683 0.009848767 0 0 0)
        meshes=humerus_rv.vtp
    Body ulna_r: mass=0.4462023 mass_center=(0 -0.120525 0) inertia=(0.002175557 0.0004539144 0.002359914 0 0 0)
        meshes=ulna_rv.vtp
    Body radius_r: mass=0.4462023 mass_center=(0 -0.120525 0) inertia=(0.002175557 0.0004539144 0.002359914 0 0 0)
        meshes=radius_rv.vtp
    Body hand_r: mass=0.3360289 mass_center=(0 -0.068095 0) inertia=(0.0006551645 0.0004017656 0.0009842157 0 0 0)
        meshes=(pisiform_rvs.vtp lunate_rvs.vtp scaphoid_rvs.vtp triquetrum_rvs.vtp hamate_rvs.vtp capitate_rvs.vtp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)
    Body humerus_l: mass=1.49285 mass_center=(0 -0.164502 0) inertia=(0.008774209 0.00302683 0.009848767 0 0 0)
        meshes=humerus_lv.vtp
    Body ulna_l: mass=0.4462023 mass_center=(0 -0.120525 0) inertia=(0.002175557 0.0004539144 0.002359914 0 0 0)
        meshes=ulna_lv.vtp
    Body radius_l: mass=0.4462023 mass_center=(0 -0.120525 0) inertia=(0.002175557 0.0004539144 0.002359914 0 0 0)
        meshes=radius_lv.vtp
    Body hand_l: mass=0.3360289 mass_center=(0 -0.068095 0) inertia=(0.0006551645 0.0004017656 0.0009842157 0 0 0)
        meshes=(pisiform_lvs.vtp lunate_lvs.vtp scaphoid_lvs.vtp triquetrum_lvs.vtp hamate_lvs.vtp capitate_lvs.vtp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)
    Body exo_Origin_base: mass=2.32 mass_center=(-0.10707 0.17053 -0.1096)
        inertia=(0.001834 0.00027884 0.0019287 5.8724e-7 -8.4104e-6 8.2684e-8) meshes=Origin_base.vtp
    Body exo_J1_R: mass=0.05 mass_center=(0.006528 -0.0055065 0.0034168)
        inertia=(5.247e-6 1.1674e-5 6.895e-6 4.487e-7 -1.3581e-6 4.3204e-7) meshes=J1_R.vtp
    Body exo_J2_R: mass=0.24 mass_center=(0.18998 -0.0039533 0.088518)
        inertia=(0.00024198 0.0010165 0.00085952 -3.5336e-5 -0.00037831 -2.576e-5) meshes=J2_R.vtp
    Body exo_J1_L: mass=0.05 mass_center=(0 0 0) inertia=(1e-9 1e-9 1e-9 0 0 0) meshes=J1_L.vtp
    Body exo_J2_L: mass=0.24 mass_center=(0.056315 0.021269 0.20543)
        inertia=(0.00097599 0.0010165 0.0001312 -2.2665e-5 -0.00024571 -5.5224e-5) meshes=J2_L.vtp
  JointSet:
    CustomJoint ground_pelvis: socket_parent_frame=ground_offset socket_child_frame=pelvis_offset
      Coordinate pelvis_tilt: default_value=0 range=(-3.141593 3.141593) clamped=true
      Coordinate pelvis_list: default_value=0 range=(-3.141593 3.141593) clamped=true
      Coordinate pelvis_rotation: default_value=0 range=(-3.141593 3.141593) clamped=true
      Coordinate pelvis_tx: default_value=0 range=(-40 40) clamped=true
      Coordinate pelvis_ty: default_value=0.94 range=(-5 5) clamped=true
      Coordinate pelvis_tz: default_value=0 range=(-40 40) clamped=true
      PhysicalOffsetFrame ground_offset: socket_parent=/ground translation=(0 0 0) [meters]
      PhysicalOffsetFrame pelvis_offset: socket_parent=/bodyset/pelvis translation=(0 0 0)
      SpatialTransform:
        TransformAxis rotation1: coordinates=pelvis_tilt axis=(0 0 1) LinearFunction(coefficients=1 0)
        TransformAxis rotation2: coordinates=pelvis_list axis=(1 0 0) LinearFunction(coefficients=1 0)
        TransformAxis rotation3: coordinates=pelvis_rotation axis=(0 1 0) LinearFunction(coefficients=1 0)
        TransformAxis translation1: coordinates=pelvis_tx axis=(1 0 0) LinearFunction(coefficients=1 0)
        TransformAxis translation2: coordinates=pelvis_ty axis=(0 1 0) LinearFunction(coefficients=1 0)
        TransformAxis translation3: coordinates=pelvis_tz axis=(0 0 1) LinearFunction(coefficients=1 0)
    CustomJoint hip_r: socket_parent_frame=pelvis_offset socket_child_frame=femur_r_offset
      Coordinate hip_flexion_r: default_value=0 range=(-0.5235988 2.094395) clamped=true
      Coordinate hip_adduction_r: default_value=0 range=(-0.8726646 0.5235988) clamped=true
      Coordinate hip_rotation_r: default_value=0 range=(-0.6981317 0.6981317) clamped=true
      PhysicalOffsetFrame pelvis_offset: socket_parent=/bodyset/pelvis translation=(-0.05643156 -0.07690361 0.07486837)
      PhysicalOffsetFrame femur_r_offset: socket_parent=/bodyset/femur_r translation=(0 0 0)
      SpatialTransform: axes_held_at_zero=(translation1 translation2 translation3)
        TransformAxis rotation1: coordinates=hip_flexion_r axis=(0 0 1) LinearFunction(coefficients=1 0)
        TransformAxis rotation2: coordinates=hip_adduction_r axis=(1 0 0) LinearFunction(coefficients=1 0)
        TransformAxis rotation3: coordinates=hip_rotation_r axis=(0 1 0) LinearFunction(coefficients=1 0)
    CustomJoint walker_knee_r: socket_parent_frame=femur_r_offset socket_child_frame=tibia_r_offset
      Coordinate knee_angle_r: default_value=0 range=(0 2.0944) clamped=true
      PhysicalOffsetFrame femur_r_offset: socket_parent=/bodyset/femur_r
          translation=(-0.008379735 -0.4293901 -0.003197179) orientation=(-1.64157 1.44618 1.5708) [radians]
      PhysicalOffsetFrame tibia_r_offset: socket_parent=/bodyset/tibia_r
          translation=(-0.007698186 -0.003428488 -0.001675434) orientation=(-1.64157 1.44618 1.5708)
      SpatialTransform: axes_held_at_zero=translation3
        TransformAxis rotation1: coordinates=knee_angle_r axis=(1 0 0) LinearFunction(coefficients=1 0)
        TransformAxis rotation2: coordinates=knee_angle_r axis=(0 0 1)
          SimmSpline: x=(0 0.174533 0.349066 0.523599 0.698132 0.872665 1.0472 1.22173 1.39626 1.5708 1.74533 1.91986 2.0944)
              y=(0 0.0126809 0.0226969 0.0296054 0.0332049 0.0335354 0.0308779 0.0257548 0.0189295 0.011407 0.00443314 -0.00050475 -0.0016782)
        TransformAxis rotation3: coordinates=knee_angle_r axis=(0 1 0)
          SimmSpline: x=(0 0.174533 0.349066 0.523599 0.698132 0.872665 1.0472 1.22173 1.39626 1.5708 1.74533 1.91986 2.0944)
              y=(0 0.059461 0.109399 0.150618 0.18392 0.210107 0.229983 0.24435 0.254012 0.25977 0.262428 0.262788 0.261654)
        TransformAxis translation1: coordinates=knee_angle_r axis=(0 1 0)
          MultiplierFunction: scale=1.05253
            SimmSpline: x=(0 0.174533 0.349066 0.523599 0.698132 0.872665 1.0472 1.22173 1.39626 1.5708 1.74533 1.91986 2.0944)
                y=(0 0.000479 0.000835 0.001086 0.001251 0.001346 0.001391 0.001403 0.0014 0.0014 0.001421 0.001481 0.001599)
        TransformAxis translation2: coordinates=knee_angle_r axis=(0 0 1)
          MultiplierFunction: scale=1.162611
            SimmSpline: x=(0 0.174533 0.349066 0.523599 0.698132 0.872665 1.0472 1.22173 1.39626 1.5708 1.74533 1.91986 2.0944)
                y=(0 0.000988 0.001899 0.002734 0.003492 0.004173 0.004777 0.005305 0.005756 0.00613 0.006427 0.006648 0.006792)
    CustomJoint patellofemoral_r: socket_parent_frame=femur_r_offset socket_child_frame=patella_r_offset
      Coordinate knee_angle_r_beta: default_value=0 range=(-99999.9 99999.9) clamped=false
      PhysicalOffsetFrame femur_r_offset: socket_parent=/bodyset/femur_r
          translation=(-0.008379735 -0.4293901 -0.003197179)
      PhysicalOffsetFrame patella_r_offset: socket_parent=/bodyset/patella_r translation=(0 0 0)
      SpatialTransform: axes_held_at_zero=(rotation2 rotation3)
        TransformAxis rotation1: coordinates=knee_angle_r_beta axis=(0 0 1)
          SimmSpline: x=(0 0.174533 0.349066 0.523599 0.698132 0.872665 1.0472 1.22173 1.39626 1.5708 1.74533 1.91986 2.0944)
              y=(0.00113686 -0.00629212 -0.105582 -0.253683 -0.414245 -0.579047 -0.747244 -0.91799 -1.09044 -1.26379 -1.43763 -1.61186 -1.78634)
        TransformAxis translation1: coordinates=knee_angle_r_beta axis=(1 0 0)
          MultiplierFunction: scale=1.035814
            SimmSpline: x=(0 0.174533 0.349066 0.523599 0.698132 0.872665 1.0472 1.22173 1.39626 1.5708 1.74533 1.91986 2.0944)
                y=(0.0524 0.0488 0.0437 0.0371 0.0296 0.0216 0.0136 0.0057 -0.0019 -0.0088 -0.0148 -0.0196 -0.0227)
        TransformAxis translation2: coordinates=knee_angle_r_beta axis=(0 1 0)
          MultiplierFunction: scale=1.05253
            SimmSpline: x=(0 0.174533 0.349066 0.523599 0.698132 0.872665 1.0472 1.22173 1.39626 1.5708 1.74533 1.91986 2.0944)
                y=(-0.0108 -0.019 -0.0263 -0.0322 -0.0367 -0.0395 -0.0408 -0.0404 -0.0384 -0.0349 -0.0301 -0.0245 -0.0187)
        TransformAxis translation3: axis=(0 0 1) MultiplierFunction(scale=1.162611, Constant(value=0.00275))
    PinJoint ankle_r: socket_parent_frame=tibia_r_offset socket_child_frame=talus_r_offset
      Coordinate ankle_angle_r: default_value=0 range=(-0.6981317 0.5235988) clamped=true
      PhysicalOffsetFrame tibia_r_offset: socket_parent=/bodyset/tibia_r translation=(-0.009516222 -0.3879697 0)
          orientation=(0.175895 -0.105208 0.0186622)
      PhysicalOffsetFrame talus_r_offset: socket_parent=/bodyset/talus_r translation=(0 0 0)
          orientation=(0.175895 -0.105208 0.0186622)
    PinJoint subtalar_r: socket_parent_frame=talus_r_offset socket_child_frame=calcn_r_offset
      Coordinate subtalar_angle_r: default_value=0 range=(-0.3490659 0.3490659) clamped=true
      PhysicalOffsetFrame talus_r_offset: socket_parent=/bodyset/talus_r
          translation=(-0.04911453 -0.0505825 0.008904997) orientation=(-1.76819 0.906223 1.8196)
      PhysicalOffsetFrame calcn_r_offset: socket_parent=/bodyset/calcn_r translation=(0 0 0)
          orientation=(-1.76819 0.906223 1.8196)
    PinJoint mtp_r: socket_parent_frame=calcn_r_offset socket_child_frame=toes_r_offset
      Coordinate mtp_angle_r: default_value=0 range=(-0.5235988 0.5235988) clamped=true
      PhysicalOffsetFrame calcn_r_offset: socket_parent=/bodyset/calcn_r
          translation=(0.1643515 -0.001733426 0.001026288) orientation=(-3.14159 0.619901 0)
      PhysicalOffsetFrame toes_r_offset: socket_parent=/bodyset/toes_r translation=(0 0 0)
          orientation=(-3.14159 0.619901 0)
    CustomJoint hip_l: socket_parent_frame=pelvis_offset socket_child_frame=femur_l_offset
      Coordinate hip_flexion_l: default_value=0 range=(-0.5235988 2.094395) clamped=true
      Coordinate hip_adduction_l: default_value=0 range=(-0.8726646 0.5235988) clamped=true
      Coordinate hip_rotation_l: default_value=0 range=(-0.6981317 0.6981317) clamped=true
      PhysicalOffsetFrame pelvis_offset: socket_parent=/bodyset/pelvis
          translation=(-0.05643156 -0.07690361 -0.07486837)
      PhysicalOffsetFrame femur_l_offset: socket_parent=/bodyset/femur_l translation=(0 0 0)
      SpatialTransform: axes_held_at_zero=(translation1 translation2 translation3)
        TransformAxis rotation1: coordinates=hip_flexion_l axis=(0 0 1) LinearFunction(coefficients=1 0)
        TransformAxis rotation2: coordinates=hip_adduction_l axis=(1 0 0) LinearFunction(coefficients=-1 0)
        TransformAxis rotation3: coordinates=hip_rotation_l axis=(0 1 0) LinearFunction(coefficients=-1 0)
    CustomJoint walker_knee_l: socket_parent_frame=femur_l_offset socket_child_frame=tibia_l_offset
      Coordinate knee_angle_l: default_value=0 range=(0 2.0944) clamped=true
      PhysicalOffsetFrame femur_l_offset: socket_parent=/bodyset/femur_l
          translation=(-0.008379735 -0.4293901 0.003197179) orientation=(1.64157 -1.44618 1.5708)
      PhysicalOffsetFrame tibia_l_offset: socket_parent=/bodyset/tibia_l
          translation=(-0.007698186 -0.003428488 0.001675434) orientation=(1.64157 -1.44618 1.5708)
      SpatialTransform: axes_held_at_zero=translation3
        TransformAxis rotation1: coordinates=knee_angle_l axis=(-1 0 0) LinearFunction(coefficients=1 0)
        TransformAxis rotation2: coordinates=knee_angle_l axis=(0 0 1)
          SimmSpline: x=(0 0.174533 0.349066 0.523599 0.698132 0.872665 1.0472 1.22173 1.39626 1.5708 1.74533 1.91986 2.0944)
              y=(0 0.0126809 0.0226969 0.0296054 0.0332049 0.0335354 0.0308779 0.0257548 0.0189295 0.011407 0.00443314 -0.00050475 -0.0016782)
        TransformAxis rotation3: coordinates=knee_angle_l axis=(0 1 0)
          SimmSpline: x=(0 0.174533 0.349066 0.523599 0.698132 0.872665 1.0472 1.22173 1.39626 1.5708 1.74533 1.91986 2.0944)
              y=(0 -0.059461 -0.109399 -0.150618 -0.18392 -0.210107 -0.229983 -0.24435 -0.254012 -0.25977 -0.262428 -0.262788 -0.261654)
        TransformAxis translation1: coordinates=knee_angle_l axis=(0 1 0)
          MultiplierFunction: scale=1.05253
            SimmSpline: x=(0 0.174533 0.349066 0.523599 0.698132 0.872665 1.0472 1.22173 1.39626 1.5708 1.74533 1.91986 2.0944)
                y=(0 0.000479 0.000835 0.001086 0.001251 0.001346 0.001391 0.001403 0.0014 0.0014 0.001421 0.001481 0.001599)
        TransformAxis translation2: coordinates=knee_angle_l axis=(0 0 1)
          MultiplierFunction: scale=1.162611
            SimmSpline: x=(0 0.174533 0.349066 0.523599 0.698132 0.872665 1.0472 1.22173 1.39626 1.5708 1.74533 1.91986 2.0944)
                y=(0 -0.000988 -0.001899 -0.002734 -0.003492 -0.004173 -0.004777 -0.005305 -0.005756 -0.00613 -0.006427 -0.006648 -0.006792)
    CustomJoint patellofemoral_l: socket_parent_frame=femur_l_offset socket_child_frame=patella_l_offset
      Coordinate knee_angle_l_beta: default_value=0 range=(-99999.9 99999.9) clamped=false
      PhysicalOffsetFrame femur_l_offset: socket_parent=/bodyset/femur_l
          translation=(-0.008379735 -0.4293901 0.003197179)
      PhysicalOffsetFrame patella_l_offset: socket_parent=/bodyset/patella_l translation=(0 0 0)
      SpatialTransform: axes_held_at_zero=(rotation2 rotation3)
        TransformAxis rotation1: coordinates=knee_angle_l_beta axis=(0 0 1)
          SimmSpline: x=(0 0.174533 0.349066 0.523599 0.698132 0.872665 1.0472 1.22173 1.39626 1.5708 1.74533 1.91986 2.0944)
              y=(0.00113686 -0.00629212 -0.105582 -0.253683 -0.414245 -0.579047 -0.747244 -0.91799 -1.09044 -1.26379 -1.43763 -1.61186 -1.78634)
        TransformAxis translation1: coordinates=knee_angle_l_beta axis=(1 0 0)
          MultiplierFunction: scale=1.035814
            SimmSpline: x=(0 0.174533 0.349066 0.523599 0.698132 0.872665 1.0472 1.22173 1.39626 1.5708 1.74533 1.91986 2.0944)
                y=(0.0524 0.0488 0.0437 0.0371 0.0296 0.0216 0.0136 0.0057 -0.0019 -0.0088 -0.0148 -0.0196 -0.0227)
        TransformAxis translation2: coordinates=knee_angle_l_beta axis=(0 1 0)
          MultiplierFunction: scale=1.05253
            SimmSpline: x=(0 0.174533 0.349066 0.523599 0.698132 0.872665 1.0472 1.22173 1.39626 1.5708 1.74533 1.91986 2.0944)
                y=(-0.0108 -0.019 -0.0263 -0.0322 -0.0367 -0.0395 -0.0408 -0.0404 -0.0384 -0.0349 -0.0301 -0.0245 -0.0187)
        TransformAxis translation3: axis=(0 0 1) MultiplierFunction(scale=1.162611, Constant(value=-0.00275))
    PinJoint ankle_l: socket_parent_frame=tibia_l_offset socket_child_frame=talus_l_offset
      Coordinate ankle_angle_l: default_value=0 range=(-0.6981317 0.5235988) clamped=true
      PhysicalOffsetFrame tibia_l_offset: socket_parent=/bodyset/tibia_l translation=(-0.009516222 -0.3879697 0)
          orientation=(-0.175895 0.105208 0.0186622)
      PhysicalOffsetFrame talus_l_offset: socket_parent=/bodyset/talus_l translation=(0 0 0)
          orientation=(-0.175895 0.105208 0.0186622)
    PinJoint subtalar_l: socket_parent_frame=talus_l_offset socket_child_frame=calcn_l_offset
      Coordinate subtalar_angle_l: default_value=0 range=(-0.3490659 0.3490659) clamped=true
      PhysicalOffsetFrame talus_l_offset: socket_parent=/bodyset/talus_l
          translation=(-0.04911453 -0.0505825 -0.008904997) orientation=(1.76819 -0.906223 1.8196)
      PhysicalOffsetFrame calcn_l_offset: socket_parent=/bodyset/calcn_l translation=(0 0 0)
          orientation=(1.76819 -0.906223 1.8196)
    PinJoint mtp_l: socket_parent_frame=calcn_l_offset socket_child_frame=toes_l_offset
      Coordinate mtp_angle_l: default_value=0 range=(-0.5235988 0.5235988) clamped=true
      PhysicalOffsetFrame calcn_l_offset: socket_parent=/bodyset/calcn_l
          translation=(0.1643515 -0.001733426 -0.001026288) orientation=(-3.14159 -0.619901 0)
      PhysicalOffsetFrame toes_l_offset: socket_parent=/bodyset/toes_l translation=(0 0 0)
          orientation=(-3.14159 -0.619901 0)
    CustomJoint back: socket_parent_frame=pelvis_offset socket_child_frame=torso_offset
      Coordinate lumbar_extension: default_value=0 range=(-1.570796 1.570796) clamped=true
      Coordinate lumbar_bending: default_value=0 range=(-1.570796 1.570796) clamped=true
      Coordinate lumbar_rotation: default_value=0 range=(-1.570796 1.570796) clamped=true
      PhysicalOffsetFrame pelvis_offset: socket_parent=/bodyset/pelvis translation=(-0.1009784 0.07985278 0)
      PhysicalOffsetFrame torso_offset: socket_parent=/bodyset/torso translation=(0 0 0)
      SpatialTransform: axes_held_at_zero=(translation1 translation2 translation3)
        TransformAxis rotation1: coordinates=lumbar_extension axis=(0 0 1) LinearFunction(coefficients=1 0)
        TransformAxis rotation2: coordinates=lumbar_bending axis=(1 0 0) LinearFunction(coefficients=1 0)
        TransformAxis rotation3: coordinates=lumbar_rotation axis=(0 1 0) LinearFunction(coefficients=1 0)
    CustomJoint acromial_r: socket_parent_frame=torso_offset socket_child_frame=humerus_r_offset
      Coordinate arm_flex_r: default_value=0 range=(-10 10) clamped=true
      Coordinate arm_add_r: default_value=0 range=(-10 10) clamped=true
      Coordinate arm_rot_r: default_value=0 range=(-10 10) clamped=true
      PhysicalOffsetFrame torso_offset: socket_parent=/bodyset/torso translation=(0.003304236 0.317654 0.1922162)
      PhysicalOffsetFrame humerus_r_offset: socket_parent=/bodyset/humerus_r translation=(0 0 0)
      SpatialTransform: axes_held_at_zero=(translation1 translation2 translation3)
        TransformAxis rotation1: coordinates=arm_flex_r axis=(0 0 1) LinearFunction(coefficients=1 0)
        TransformAxis rotation2: coordinates=arm_add_r axis=(1 0 0) LinearFunction(coefficients=1 0)
        TransformAxis rotation3: coordinates=arm_rot_r axis=(0 1 0) LinearFunction(coefficients=1 0)
    PinJoint elbow_r: socket_parent_frame=humerus_r_offset socket_child_frame=ulna_r_offset
      Coordinate elbow_flex_r: default_value=0 range=(0 2.618) clamped=true
      PhysicalOffsetFrame humerus_r_offset: socket_parent=/bodyset/humerus_r
          translation=(0.01221276 -0.2775314 -0.008008329) orientation=(-0.0228627 0.228018 0.0051689)
      PhysicalOffsetFrame ulna_r_offset: socket_parent=/bodyset/ulna_r translation=(0 0 0)
          orientation=(-0.0228627 0.228018 0.0051689)
    PinJoint radioulnar_r: socket_parent_frame=ulna_r_offset socket_child_frame=radius_r_offset
      Coordinate pro_sup_r: default_value=0 range=(0 1.570796) clamped=true
      PhysicalOffsetFrame ulna_r_offset: socket_parent=/bodyset/ulna_r
          translation=(-0.007104252 -0.01155932 0.02755103) orientation=(-1.56884 0.056428 1.53614)
      PhysicalOffsetFrame radius_r_offset: socket_parent=/bodyset/radius_r translation=(0 0 0)
          orientation=(-1.56884 0.056428 1.53614)
    UniversalJoint radius_hand_r: socket_parent_frame=radius_r_offset socket_child_frame=hand_r_offset
      Coordinate wrist_flex_r: default_value=0 range=(-1.22173 1.22173) clamped=true
      Coordinate wrist_dev_r: default_value=0 range=(-0.4363323 0.6108652) clamped=true
      PhysicalOffsetFrame radius_r_offset: socket_parent=/bodyset/radius_r
          translation=(-0.009290338 -0.2095918 0.01437601) orientation=(-1.5708 0 -1.5708)
      PhysicalOffsetFrame hand_r_offset: socket_parent=/bodyset/hand_r translation=(0 0 0)
          orientation=(-1.5708 0 -1.5708)
    CustomJoint acromial_l: socket_parent_frame=torso_offset socket_child_frame=humerus_l_offset
      Coordinate arm_flex_l: default_value=0 range=(-1.570796 1.570796) clamped=true
      Coordinate arm_add_l: default_value=0 range=(-2.094395 1.570796) clamped=true
      Coordinate arm_rot_l: default_value=0 range=(-1.570796 1.570796) clamped=true
      PhysicalOffsetFrame torso_offset: socket_parent=/bodyset/torso translation=(0.003304236 0.317654 -0.1922162)
      PhysicalOffsetFrame humerus_l_offset: socket_parent=/bodyset/humerus_l translation=(0 0 0)
      SpatialTransform: axes_held_at_zero=(translation1 translation2 translation3)
        TransformAxis rotation1: coordinates=arm_flex_l axis=(0 0 1) LinearFunction(coefficients=1 0)
        TransformAxis rotation2: coordinates=arm_add_l axis=(-1 0 0) LinearFunction(coefficients=1 0)
        TransformAxis rotation3: coordinates=arm_rot_l axis=(0 -1 0) LinearFunction(coefficients=1 0)
    PinJoint elbow_l: socket_parent_frame=humerus_l_offset socket_child_frame=ulna_l_offset
      Coordinate elbow_flex_l: default_value=0 range=(0 2.618) clamped=true
      PhysicalOffsetFrame humerus_l_offset: socket_parent=/bodyset/humerus_l
          translation=(0.01221276 -0.2775314 0.008008329) orientation=(0.0228627 -0.228018 0.0051689)
      PhysicalOffsetFrame ulna_l_offset: socket_parent=/bodyset/ulna_l translation=(0 0 0)
          orientation=(0.0228627 -0.228018 0.0051689)
    PinJoint radioulnar_l: socket_parent_frame=ulna_l_offset socket_child_frame=radius_l_offset
      Coordinate pro_sup_l: default_value=0 range=(0 1.570796) clamped=true
      PhysicalOffsetFrame ulna_l_offset: socket_parent=/bodyset/ulna_l
          translation=(-0.007104252 -0.01155932 -0.02755103) orientation=(1.56884 -0.056428 1.53614)
      PhysicalOffsetFrame radius_l_offset: socket_parent=/bodyset/radius_l translation=(0 0 0)
          orientation=(1.56884 -0.056428 1.53614)
    UniversalJoint radius_hand_l: socket_parent_frame=radius_l_offset socket_child_frame=hand_l_offset
      Coordinate wrist_flex_l: default_value=0 range=(-1.22173 1.22173) clamped=true
      Coordinate wrist_dev_l: default_value=0 range=(-0.4363323 0.6108652) clamped=true
      PhysicalOffsetFrame radius_l_offset: socket_parent=/bodyset/radius_l
          translation=(-0.009290338 -0.2095918 -0.01437601) orientation=(1.5708 0 1.5708)
      PhysicalOffsetFrame hand_l_offset: socket_parent=/bodyset/hand_l translation=(0 0 0)
          orientation=(1.5708 0 1.5708)
    WeldJoint exo_ground_to_Origin_base: socket_parent_frame=pelvis_offset socket_child_frame=exo_Origin_base_offset
      PhysicalOffsetFrame pelvis_offset: socket_parent=/bodyset/pelvis translation=(-0.07 -0.07 0.175)
          orientation=(-1.570796 1.570796 0)
      PhysicalOffsetFrame exo_Origin_base_offset: socket_parent=/bodyset/exo_Origin_base translation=(0 0 0)
    PinJoint exo_J1_R: socket_parent_frame=exo_Origin_base_offset socket_child_frame=exo_J1_R_offset
      Coordinate exo_J1_R_angle: default_value=-0.04597197 range=(-3.1416 3.1416)
      PhysicalOffsetFrame exo_Origin_base_offset: socket_parent=/bodyset/exo_Origin_base
          translation=(0 0.0054908 0.00031812) orientation=(1.628668 0.0001147295 -0.000121569)
      PhysicalOffsetFrame exo_J1_R_offset: socket_parent=/bodyset/exo_J1_R translation=(0 0 0)
          orientation=(1.628668 0.0001147295 -0.000121569)
    PinJoint exo_J2_R: socket_parent_frame=exo_J1_R_offset socket_child_frame=exo_J2_R_offset
      Coordinate exo_J2_R_angle: default_value=0.2692869 range=(-3.1416 3.1416)
      PhysicalOffsetFrame exo_J1_R_offset: socket_parent=/bodyset/exo_J1_R translation=(0.041121 -0.0112 0.024983)
          orientation=(-0.1435382 -0.3526982 -0.02562114)
      PhysicalOffsetFrame exo_J2_R_offset: socket_parent=/bodyset/exo_J2_R translation=(0 0 0)
          orientation=(-0.1435382 -0.3526982 -0.02562114)
    PinJoint exo_J1_L: socket_parent_frame=exo_Origin_base_offset socket_child_frame=exo_J1_L_offset
      Coordinate exo_J1_L_angle: default_value=0.8888438 range=(-3.1416 3.1416)
      PhysicalOffsetFrame exo_Origin_base_offset: socket_parent=/bodyset/exo_Origin_base
          translation=(0 0.34468 0.00030255) orientation=(-1.628668 0.0001147295 0.000121569)
      PhysicalOffsetFrame exo_J1_L_offset: socket_parent=/bodyset/exo_J1_L translation=(0 0 0)
          orientation=(-1.628668 0.0001147295 0.000121569)
    PinJoint exo_J2_L: socket_parent_frame=exo_J1_L_offset socket_child_frame=exo_J2_L_offset
      Coordinate exo_J2_L_angle: default_value=0.3677932 range=(-3.1416 3.1416)
      PhysicalOffsetFrame exo_J1_L_offset: socket_parent=/bodyset/exo_J1_L translation=(0.0075574 0.012454 0.047233)
          orientation=(-2.700097 1.168114 2.487009)
      PhysicalOffsetFrame exo_J2_L_offset: socket_parent=/bodyset/exo_J2_L translation=(0 0 0)
          orientation=(-2.700097 1.168114 2.487009)
  ControllerSet:
    PrescribedController exo_controller: socket_actuators=(/forceset/exo_hip_r /forceset/exo_hip_l)
      FunctionSet ControlFunctions:
        PiecewiseLinearFunction: x=(1 1.004 1.008 1.012 1.016 1.02 1.024 1.028 1.032 1.036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)
            y=(0 0.0638965 0.319446 0.574851 0.829995 1.08476 1.33904 1.59271 1.84565 2.09776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)
        PiecewiseLinearFunction: x=(1 1.004 1.008 1.012 1.016 1.02 1.024 1.028 1.032 1.036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)
            y=(5.70249 5.47633 5.24769 5.01666 4.78336 4.54789 4.31036 4.07087 3.82953 3.58646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)
  ConstraintSet:
    CoordinateCouplerConstraint patellofemoral_knee_angle_r_con: independent_coordinate_names=knee_angle_r
        dependent_coordinate_name=knee_angle_r_beta scale_factor=1
        coupled_coordinates_function=LinearFunction(coefficients=1 0)
    CoordinateCouplerConstraint patellofemoral_knee_angle_l_con: independent_coordinate_names=knee_angle_l
        dependent_coordinate_name=knee_angle_l_beta scale_factor=1
        coupled_coordinates_function=LinearFunction(coefficients=1 0)
  ForceSet:
    Millard2012EquilibriumMuscle [values shared by the 80 below unless stated]: fiber_damping=0.01
        default_activation=0.01 minimum_activation=0.01
      ActiveForceLengthCurve: min_norm_active_fiber_length=0.25 transition_norm_fiber_length=0.77
          max_norm_active_fiber_length=1.9 shallow_ascending_slope=0.75 minimum_value=0
      ForceVelocityCurve: concentric_slope_at_vmax=0 concentric_slope_near_vmax=0.25 isometric_slope=5
          eccentric_slope_at_vmax=0 eccentric_slope_near_vmax=0.15 max_eccentric_velocity_force_multiplier=1.4
      TendonForceLengthCurve
    Millard2012EquilibriumMuscle addbrev_r: max_isometric_force=625.8197 optimal_fiber_length=0.1073843
        tendon_slack_length=0.03692342 pennation_angle_at_optimal=0.1147809 [radians]
      PathPoint P1: pelvis (-0.0191528 -0.09210014 0.01492328)
      PathPoint P2: femur_r (-0.002071628 -0.1241985 0.028949)
      PathWrap: wrap_object=AB_at_femshaft_r method=hybrid
      FiberForceLengthCurve: strain_at_zero_force=-0.1927643 strain_at_one_norm_force=0.5015522
          stiffness_at_low_force=0.2 stiffness_at_one_norm_force=2.880531 curviness=0.75
    Millard2012EquilibriumMuscle addlong_r: max_isometric_force=916.8 optimal_fiber_length=0.1134185
        tendon_slack_length=0.138156 pennation_angle_at_optimal=0.1377704
      PathPoint P1: pelvis (-0.007600953 -0.08710321 0.01829556)
      PathPoint P2: femur_r (0.01166326 -0.2519441 0.01840412)
      PathWrap: wrap_object=AL_at_femshaft_r method=hybrid
      FiberForceLengthCurve: strain_at_zero_force=-0.1917374 strain_at_one_norm_force=0.5002995
          stiffness_at_low_force=0.2 stiffness_at_one_norm_force=2.890019 curviness=0.75
    Millard2012EquilibriumMuscle addmagDist_r: max_isometric_force=597.2951 optimal_fiber_length=0.188737
        tendon_slack_length=0.09306981 pennation_angle_at_optimal=0.194705
      PathPoint P1: pelvis (-0.07424466 -0.1250896 0.03858735)
      PathPoint P2: femur_r (0.01165291 -0.2762891 0.02243838)
      PathWrap: wrap_object=AMdist_at_femshaft_r method=hybrid
      FiberForceLengthCurve: strain_at_zero_force=-3.981963e-9 strain_at_one_norm_force=0.7 stiffness_at_low_force=0.2
          stiffness_at_one_norm_force=2.857143 curviness=0.75
    Millard2012EquilibriumMuscle addmagIsch_r: max_isometric_force=597.2951 optimal_fiber_length=0.1659834
        tendon_slack_length=0.2298934 pennation_angle_at_optimal=0.1680443
      PathPoint P1: pelvis (-0.08986773 -0.1271374 0.04041884)
      PathPoint P2: femur_r (0.004982265 -0.40835 -0.03805224)
      PathWrap: wrap_object=AMisch_at_condyles_r method=hybrid
      FiberForceLengthCurve: strain_at_zero_force=0.007389956 strain_at_one_norm_force=0.7000392
          stiffness_at_low_force=0.2 stiffness_at_one_norm_force=2.887464 curviness=0.75
    Millard2012EquilibriumMuscle addmagMid_r: max_isometric_force=597.2951 optimal_fiber_length=0.1474133
        tendon_slack_length=0.04991681 pennation_angle_at_optimal=0.2073076
      PathPoint P1: pelvis (-0.05280556 -0.1183095 0.02765653)
      PathPoint P2: femur_r (0.00250667 -0.1709308 0.03397148)
      PathWrap: wrap_object=AMmid_at_femshaft_r method=hybrid
      FiberForceLengthCurve: strain_at_zero_force=-3.981963e-9 strain_at_one_norm_force=0.7 stiffness_at_low_force=0.2
          stiffness_at_one_norm_force=2.857143 curviness=0.75
    Millard2012EquilibriumMuscle addmagProx_r: max_isometric_force=597.2951 optimal_fiber_length=0.1109682
        tendon_slack_length=0.04237396 pennation_angle_at_optimal=0.3114833
      PathPoint P1: pelvis (-0.03106564 -0.1053763 0.01322746)
      PathPoint P2: femur_r (-0.01581688 -0.0830025 0.03722679)
      PathWrap: wrap_object=AMprox_at_femshaft_r method=hybrid
      FiberForceLengthCurve: strain_at_zero_force=-3.981963e-9 strain_at_one_norm_force=0.7 stiffness_at_low_force=0.2
          stiffness_at_one_norm_force=2.857143 curviness=0.75
    Millard2012EquilibriumMuscle bflh_r: max_isometric_force=1313.184 optimal_fiber_length=0.1026418
        tendon_slack_length=0.342027 pennation_angle_at_optimal=0.1759182
      PathPoint P1: pelvis (-0.1042875 -0.1166928 0.056786)
      PathPoint P2: tibia_r (-0.03206967 -0.03394735 0.02854943)
      PathPoint P3: tibia_r (-0.02731156 -0.04413155 0.03419161)
      FiberForceLengthCurve: strain_at_zero_force=0.1965607 strain_at_one_norm_force=0.7068715
          stiffness_at_low_force=0.2 stiffness_at_one_norm_force=3.91918 curviness=0.75
    Millard2012EquilibriumMuscle bfsh_r: max_isometric_force=557.1148 optimal_fiber_length=0.1144743
        tendon_slack_length=0.1098218 pennation_angle_at_optimal=0.2642232
      PathPoint P1: femur_r (0.00517907 -0.222189 0.02720509)
      PathPoint P2: tibia_r (-0.02864383 -0.04063983 0.03588427)
      PathWrap: wrap_object=BF_at_gastroc_r method=hybrid
      FiberForceLengthCurve: strain_at_zero_force=0.115251 strain_at_one_norm_force=0.6888986
          stiffness_at_low_force=0.2 stiffness_at_one_norm_force=3.486462 curviness=0.75
    Millard2012EquilibriumMuscle edl_r: max_isometric_force=603.4982 optimal_fiber_length=0.0679403
        tendon_slack_length=0.3616377 pennation_angle_at_optimal=0.2182582
      PathPoint P1: tibia_r (-0.01522596 -0.1122202 0.02313294)
      PathPoint P2: tibia_r (0.0156066 -0.3646915 0.01263848)
      PathPoint P3: calcn_r (0.08447371 0.03120166 0.0007602136)
      PathPoint P4: calcn_r (0.1485414 0.004766921 0.01235347)
      PathPoint P5: toes_r (0.0002869381 0.004494216 0.01463125)
      PathPoint P6: toes_r (0.04237119 -0.0003824864 0.02390727)
      FiberForceLengthCurve: strain_at_zero_force=0.1317998 strain_at_one_norm_force=0.7072192
          stiffness_at_low_force=0.2 stiffness_at_one_norm_force=3.475726 curviness=0.75
    Millard2012EquilibriumMuscle ehl_r: max_isometric_force=285.8675 optimal_fiber_length=0.0734455
        tendon_slack_length=0.3208776 pennation_angle_at_optimal=0.1972681
      PathPoint P1: tibia_r (-0.01332271 -0.1503383 0.02132744)
      PathPoint P2: tibia_r (0.006756518 -0.282151 0.01850635)
      PathPoint P3: tibia_r (0.01903244 -0.358193 -0.003159621)
      PathPoint P4: calcn_r (0.08916159 0.03371513 -0.02005063)
      PathPoint P5: calcn_r (0.1188515 0.02678143 -0.02442186)
      PathPoint P6: calcn_r (0.1593878 0.01204731 -0.02660748)
      PathPoint P7: toes_r (0.02850252 0.003920486 -0.02342913)
      PathPoint P8: toes_r (0.05384872 0.003251135 -0.01778701)
      FiberForceLengthCurve: strain_at_zero_force=0.1051406 strain_at_one_norm_force=0.7178208
          stiffness_at_low_force=0.2 stiffness_at_one_norm_force=3.264346 curviness=0.75
    Millard2012EquilibriumMuscle fdl_r: max_isometric_force=423.177 optimal_fiber_length=0.04372753
        tendon_slack_length=0.3713633 pennation_angle_at_optimal=0.2248391
      PathPoint P1: tibia_r (-0.002188731 -0.1776901 -0.002031185)
      PathPoint P2: tibia_r (-0.01674855 -0.3535374 -0.01399261)
      PathPoint P3: calcn_r (0.04007676 0.02730145 -0.02660748)
      PathPoint P4: calcn_r (0.06507877 0.01525415 -0.02499202)
      PathPoint P5: calcn_r (0.152402 -0.007020374 0.0110231)
      PathPoint P6: toes_r (-0.001817275 -0.007458486 0.01405748)
      PathPoint P7: toes_r (0.02725912 -0.006789134 0.02056026)
      PathPoint P8: toes_r (0.0421799 -0.005737297 0.02314224)
      FiberForceLengthCurve: strain_at_zero_force=-0.01205975 strain_at_one_norm_force=0.6997089
          stiffness_at_low_force=0.2 stiffness_at_one_norm_force=2.809902 curviness=0.75
    Millard2012EquilibriumMuscle fhl_r: max_isometric_force=907.8393 optimal_fiber_length=0.05169674
        tendon_slack_length=0.347594 pennation_angle_at_optimal=0.2580255
      PathPoint P1: tibia_r (-0.02950029 -0.2097946 0.02256872)
      PathPoint P2: tibia_r (-0.02302926 -0.3560592 -0.008576114)
      PathPoint P3: calcn_r (0.03437777 0.02392127 -0.02290143)
      PathPoint P4: calcn_r (0.0954121 0.005893647 -0.02432683)
      PathPoint P5: calcn_r (0.1586525 -0.004593578 -0.02556218)
      PathPoint P6: toes_r (0.01482514 -0.006119783 -0.02534171)
      PathPoint P7: toes_r (0.05375307 -0.009753404 -0.01730887)
      FiberForceLengthCurve: strain_at_zero_force=0.01130745 strain_at_one_norm_force=0.7002505
          stiffness_at_low_force=0.2 stiffness_at_one_norm_force=2.902997 curviness=0.75
    Millard2012EquilibriumMuscle gaslat_r: max_isometric_force=1575.059 optimal_fiber_length=0.05888562
        tendon_slack_length=0.3766177 pennation_angle_at_optimal=0.2102268
      PathPoint P1: femur_r (-0.003107442 -0.4014349 0.03220431)
      PathPoint P2: calcn_r (0.004044443 0.0268681 -0.005036415)
      PathWrap: wrap_object=GasLat_at_shank_r method=hybrid
      PathWrap pathwrap_0: wrap_object=Gastroc_at_condyles_r method=hybrid
      FiberForceLengthCurve: strain_at_zero_force=-0.05983233 strain_at_one_norm_force=0.7435102
          stiffness_at_low_force=0.2 stiffness_at_one_norm_force=2.489598 curviness=0.75
    Millard2012EquilibriumMuscle gasmed_r: max_isometric_force=3115.515 optimal_fiber_length=0.05115718
        tendon_slack_length=0.3999452 pennation_angle_at_optimal=0.1656816
      PathPoint P1: femur_r (0.008286511 -0.3986983 -0.0241823)
      PathPoint P2: calcn_r (0.004044443 0.0268681 -0.005036415)
      PathWrap: wrap_object=GasMed_at_shank_r method=hybrid
      PathWrap pathwrap_0: wrap_object=Gastroc_at_condyles_r method=hybrid
      FiberForceLengthCurve: strain_at_zero_force=0.1998358 strain_at_one_norm_force=0.7902371
          stiffness_at_low_force=0.2 stiffness_at_one_norm_force=3.387526 curviness=0.75
    Millard2012EquilibriumMuscle glmax1_r: max_isometric_force=983.7836 optimal_fiber_length=0.1493803
        tendon_slack_length=0.04963173 pennation_angle_at_optimal=0.3540118
      PathPoint P1: pelvis (-0.1234403 0.03380271 0.0545572)
      PathPoint P2: pelvis (-0.1260475 -0.02371089 0.07548855)
      PathPoint P3: femur_r (-0.04599014 -0.03431247 0.03511084)
      PathPoint P4: femur_r (-0.02869205 -0.05957319 0.05464269)
      PathWrap: wrap_object=Gmax1_at_pelvis_r method=hybrid
      FiberForceLengthCurve: strain_at_zero_force=-0.07534176 strain_at_one_norm_force=0.8468075
          stiffness_at_low_force=0.2 stiffness_at_one_norm_force=2.168846 curviness=0.75
    Millard2012EquilibriumMuscle glmax2_r: max_isometric_force=1406.046 optimal_fiber_length=0.160223
        tendon_slack_length=0.06928079 pennation_angle_at_optimal=0.3673821
      PathPoint P1: pelvis (-0.132064 0.008524162 0.04476985)
      PathPoint P2: pelvis (-0.1347715 -0.05966913 0.0787833)
      PathPoint P3: femur_r (-0.04661163 -0.06146774 0.02929778)
      PathPoint P4: femur_r (-0.0161587 -0.106937 0.04871338)
      PathWrap: wrap_object=Gmax2_at_pelvis_r method=hybrid
      FiberForceLengthCurve: strain_at_zero_force=0.199275 strain_at_one_norm_force=0.7164175
          stiffness_at_low_force=0.2 stiffness_at_one_norm_force=3.867406 curviness=0.75
    Millard2012EquilibriumMuscle glmax3_r: max_isometric_force=947.7541 optimal_fiber_length=0.1730389
        tendon_slack_length=0.07223763 pennation_angle_at_optimal=0.3824161
      PathPoint P1: pelvis (-0.1303594 -0.05143891 0.008721399)
      PathPoint P2: pelvis (-0.1276519 -0.1237473 0.04215343)
      PathPoint P3: femur_r (-0.02910637 -0.1184096 0.01092854)
      PathPoint P4: femur_r (-0.006214883 -0.149354 0.04778329)
      PathWrap: wrap_object=Gmax3_at_pelvis_r method=hybrid
      FiberForceLengthCurve: strain_at_zero_force=0.1989714 strain_at_one_norm_force=0.7121937
          stiffness_at_low_force=0.2 stiffness_at_one_norm_force=3.896947 curviness=0.75
    Millard2012EquilibriumMuscle glmed1_r: max_isometric_force=1093.467 optimal_fiber_length=0.07737754
        tendon_slack_length=0.05916396 pennation_angle_at_optimal=0.3165559
      PathPoint P1: pelvis (-0.04927323 0.02562466 0.1117195)
      PathPoint P2_0: femur_r (-0.01438927 -0.01925572 0.06881447)
      FiberForceLengthCurve: strain_at_zero_force=-3.729382e-9 strain_at_one_norm_force=0.7 stiffness_at_low_force=0.2
          stiffness_at_one_norm_force=2.857143 curviness=0.75
    Millard2012EquilibriumMuscle glmed2_r: max_isometric_force=765.0917 optimal_fiber_length=0.08511109
        tendon_slack_length=0.07607393 pennation_angle_at_optimal=0.3165559
      PathPoint P1: pelvis (-0.08496153 0.05352969 0.07944567)
      PathPoint P2_0: femur_r (-0.02282521 -0.01048225 0.06525294)
      FiberForceLengthCurve: strain_at_zero_force=0.06397124 strain_at_one_norm_force=0.7014005
          stiffness_at_low_force=0.2 stiffness_at_one_norm_force=3.137603 curviness=0.75
    Millard2012EquilibriumMuscle glmed3_r: max_isometric_force=871.1993 optimal_fiber_length=0.08009953
        tendon_slack_length=0.04963191 pennation_angle_at_optimal=0.3165559
      PathPoint P1: pelvis (-0.1001419 0.01524491 0.06192351)
      PathPoint P2_0: femur_r (-0.03200665 -0.00494689 0.06022322)
      FiberForceLengthCurve: strain_at_zero_force=0.1252157 strain_at_one_norm_force=0.7030514
          stiffness_at_low_force=0.2 stiffness_at_one_norm_force=3.461191 curviness=0.75
    Millard2012EquilibriumMuscle glmin1_r: max_isometric_force=374.0459 optimal_fiber_length=0.08257763
        tendon_slack_length=0.01959735 pennation_angle_at_optimal=0.1745329
      PathPoint P1: pelvis (-0.0296613 -0.0001060294 0.1147877)
      PathPoint P2: femur_r (0.005685913 -0.01630221 0.06515014)
      FiberForceLengthCurve: strain_at_zero_force=-3.729382e-9 strain_at_one_norm_force=0.7 stiffness_at_low_force=0.2
          stiffness_at_one_norm_force=2.857143 curviness=0.75
    Millard2012EquilibriumMuscle glmin2_r: max_isometric_force=394.8197 optimal_fiber_length=0.06992735
        tendon_slack_length=0.03258996 pennation_angle_at_optimal=0
      PathPoint P1: pelvis (-0.06177028 0.009798148 0.09801431)
      PathPoint P2: femur_r (0.003670449 -0.009485682 0.06099558)
      FiberForceLengthCurve: strain_at_zero_force=0.003039474 strain_at_one_norm_force=0.7000285
          stiffness_at_low_force=0.2 stiffness_at_one_norm_force=2.869486 curviness=0.75
    Millard2012EquilibriumMuscle glmin3_r: max_isometric_force=446.7738 optimal_fiber_length=0.03723054
        tendon_slack_length=0.04984239 pennation_angle_at_optimal=0.01745329
      PathPoint P1: pelvis (-0.0791181 -0.01518672 0.07732974)
      PathPoint P2: femur_r (-0.003704213 -0.00133324 0.05959733)
      FiberForceLengthCurve: strain_at_zero_force=0.007461173 strain_at_one_norm_force=0.7002322
          stiffness_at_low_force=0.2 stiffness_at_one_norm_force=2.886957 curviness=0.75
    Millard2012EquilibriumMuscle grac_r: max_isometric_force=281.3115 optimal_fiber_length=0.2380777
        tendon_slack_length=0.1797746 pennation_angle_at_optimal=0.1720016
      PathPoint P1: pelvis (-0.04749091 -0.1267063 0.02379973)
      PathPoint P2: tibia_r (-0.01752888 -0.0461199 -0.03341299)
      PathPoint P3: tibia_r (0.001693888 -0.06752613 -0.0177503)
      PathWrap: wrap_object=GR_at_condyles_r method=hybrid
      FiberForceLengthCurve: strain_at_zero_force=-0.1969779 strain_at_one_norm_force=0.8027483
          stiffness_at_low_force=0.2 stiffness_at_one_norm_force=2.000548 curviness=0.75
    Millard2012EquilibriumMuscle iliacus_r: max_isometric_force=1021.141 optimal_fiber_length=0.1072586
        tendon_slack_length=0.09671454 pennation_angle_at_optimal=0.279914
      PathPoint P1: pelvis (-0.06066724 0.03027547 0.08169044)
      PathPoint P2: pelvis (-0.01353732 -0.05457423 0.07325975)
      PathPoint P3: femur_r (-0.002382372 -0.05946794 0.01616029)
      PathPoint P4: femur_r (-0.01263693 -0.06704615 0.02278717)
      PathWrap: wrap_object=IL_at_brim_r method=hybrid range=(2 3)
      FiberForceLengthCurve: strain_at_zero_force=-0.1703103 strain_at_one_norm_force=0.5005449
          stiffness_at_low_force=0.2 stiffness_at_one_norm_force=2.98127 curviness=0.75
    Millard2012EquilibriumMuscle perbrev_r: max_isometric_force=521.2016 optimal_fiber_length=0.04540805
        tendon_slack_length=0.1475537 pennation_angle_at_optimal=0.2052361
      PathPoint P1: tibia_r (-0.02312442 -0.2455848 0.02832374)
      PathPoint P2: tibia_r (-0.03225999 -0.3775915 0.02809806)
      PathPoint P3: tibia_r (-0.02712123 -0.3883577 0.02877512)
      PathPoint P4: calcn_r (0.04329393 0.02340125 0.02214122)
      PathPoint P5: calcn_r (0.06222928 0.01898101 0.03259416)
      FiberForceLengthCurve: strain_at_zero_force=-0.04234068 strain_at_one_norm_force=0.6987541
          stiffness_at_low_force=0.2 stiffness_at_one_norm_force=2.69871 curviness=0.75
    Millard2012EquilibriumMuscle perlong_r: max_isometric_force=1115.371 optimal_fiber_length=0.04986519
        tendon_slack_length=0.3261073 pennation_angle_at_optimal=0.2479525
      PathPoint P1: tibia_r (-0.01903244 -0.1331706 0.0318219)
      PathPoint P2: tibia_r (-0.03016642 -0.3782705 0.02674393)
      PathPoint P3: tibia_r (-0.02588412 -0.3893276 0.02708246)
      PathPoint P4: calcn_r (0.0402606 0.0199344 0.0210009)
      PathPoint P5: calcn_r (0.06259695 0.009187156 0.02698758)
      PathPoint P6: calcn_r (0.07831513 0.005980319 0.01121315)
      PathPoint P7: calcn_r (0.1105788 0.007367059 -0.01748491)
      FiberForceLengthCurve: strain_at_zero_force=-0.1323481 strain_at_one_norm_force=0.6924185
          stiffness_at_low_force=0.2 stiffness_at_one_norm_force=2.424929 curviness=0.75
    Millard2012EquilibriumMuscle piri_r: max_isometric_force=1029.787 optimal_fiber_length=0.02650418
        tendon_slack_length=0.1171345 pennation_angle_at_optimal=0.1745329
      PathPoint P1: pelvis (-0.1020914 -0.00639802 0.01309179)
      PathPoint P2: pelvis (-0.102302 -0.03004032 0.05903418)
      PathPoint P3: femur_r (-0.01533005 -0.003789107 0.05080608)
      FiberForceLengthCurve: strain_at_zero_force=0.09922992 strain_at_one_norm_force=0.7028348
          stiffness_at_low_force=0.2 stiffness_at_one_norm_force=3.313426 curviness=0.75
    Millard2012EquilibriumMuscle psoas_r: max_isometric_force=1426.79 optimal_fiber_length=0.1168544
        tendon_slack_length=0.09950431 pennation_angle_at_optimal=0.2155251
      PathPoint P1: pelvis (-0.06076751 0.0607469 0.03779273)
      PathPoint P2: pelvis (-0.02055667 -0.06407818 0.06356931)
      PathPoint P3: femur_r (-0.01367274 -0.04915314 0.005348008)
      PathPoint P4: femur_r (-0.02434163 -0.05515256 0.01023097)
      PathWrap: wrap_object=PS_at_brim_r method=hybrid range=(2 3)
      FiberForceLengthCurve: strain_at_zero_force=-0.09543841 strain_at_one_norm_force=0.5010382
          stiffness_at_low_force=0.2 stiffness_at_one_norm_force=3.353023 curviness=0.75
    Millard2012EquilibriumMuscle recfem_r: max_isometric_force=2191.741 optimal_fiber_length=0.0789167
        tendon_slack_length=0.4663192 pennation_angle_at_optimal=0.2170149
      PathPoint P1: pelvis (-0.02406634 -0.0380158 0.09041184)
      PathPoint P2: patella_r (0.01 0.049 0.0007)
      PathPoint P3: patella_r (0.0121 0.0437 -0.001)
      PathPoint P4: patella_r (0.005 0.00247 3e-5)
      PathPoint P5: tibia_r (0.03102288 -0.06122162 -0.0005303649)
      PathWrap: wrap_object=KnExt_at_fem_r method=hybrid
      FiberForceLengthCurve: strain_at_zero_force=0.1999726 strain_at_one_norm_force=0.8999622
          stiffness_at_low_force=0.2 stiffness_at_one_norm_force=2.857186 curviness=0.75
    Millard2012EquilibriumMuscle sart_r: max_isometric_force=249.4131 optimal_fiber_length=0.4168571
        tendon_slack_length=0.1282636 pennation_angle_at_optimal=0.02613542
      PathPoint P1: pelvis (-0.0195539 -0.0152847 0.1023311)
      PathPoint P2: femur_r (-0.003107442 -0.3755426 -0.0489459)
      PathPoint P3: tibia_r (-0.02388572 -0.03889396 -0.04118792)
      PathPoint P4: tibia_r (-0.01513079 -0.05809846 -0.02979071)
      PathPoint P5: tibia_r (0.01294206 -0.07856387 -0.002933934)
      FiberForceLengthCurve: strain_at_zero_force=-0.1984568 strain_at_one_norm_force=0.7212821
          stiffness_at_low_force=0.2 stiffness_at_one_norm_force=2.17453 curviness=0.75
    Millard2012EquilibriumMuscle semimem_r: max_isometric_force=2200.987 optimal_fiber_length=0.07252432
        tendon_slack_length=0.3653397 pennation_angle_at_optimal=0.2545615
      PathPoint P1: pelvis (-0.09897283 -0.1116959 0.05949932)
      PathPoint P2: tibia_r (-0.02759704 -0.04044584 -0.02211735)
      PathWrap: wrap_object=SM_at_condyles_r method=hybrid
      FiberForceLengthCurve: strain_at_zero_force=0.1994426 strain_at_one_norm_force=0.7353994
          stiffness_at_low_force=0.2 stiffness_at_one_norm_force=3.731644 curviness=0.75
    Millard2012EquilibriumMuscle semiten_r: max_isometric_force=591.2951 optimal_fiber_length=0.2012919
        tendon_slack_length=0.2578194 pennation_angle_at_optimal=0.241295
      PathPoint P1: pelvis (-0.1040869 -0.1227675 0.04990578)
      PathPoint P2: tibia_r (-0.02969061 -0.04927215 -0.02584119)
      PathPoint P3: tibia_r (0.001808082 -0.07497515 -0.0132027)
      PathWrap: wrap_object=ST_at_condyles_r method=hybrid
      FiberForceLengthCurve: strain_at_zero_force=0.007279189 strain_at_one_norm_force=0.7803276
          stiffness_at_low_force=0.2 stiffness_at_one_norm_force=2.58716 curviness=0.75
    Millard2012EquilibriumMuscle soleus_r: max_isometric_force=6194.843 optimal_fiber_length=0.04448196
        tendon_slack_length=0.2797873 pennation_angle_at_optimal=0.3814289
      PathPoint P1: tibia_r (-0.007232329 -0.08884506 0.01105867)
      PathPoint P2: calcn_r (0.004044443 0.0268681 -0.005036415)
      FiberForceLengthCurve: strain_at_zero_force=0.1569032 strain_at_one_norm_force=0.8506533
          stiffness_at_low_force=0.2 stiffness_at_one_norm_force=2.882882 curviness=0.75
    Millard2012EquilibriumMuscle tfl_r: max_isometric_force=411.2066 optimal_fiber_length=0.09654015
        tendon_slack_length=0.4567843 pennation_angle_at_optimal=0.05235988
      PathPoint P1: pelvis (-0.02039601 0.01063203 0.1252951)
      PathPoint P2: femur_r (0.03045293 -0.1047267 0.06940785)
      PathPoint P3: femur_r (0.01108321 -0.4262746 0.03766858)
      PathPoint P4: tibia_r (0.01027752 -0.0397669 0.03904389)
      FiberForceLengthCurve: strain_at_zero_force=0.07118385 strain_at_one_norm_force=0.7197196
          stiffness_at_low_force=0.2 stiffness_at_one_norm_force=3.08387 curviness=0.75
    Millard2012EquilibriumMuscle tibant_r: max_isometric_force=1227.452 optimal_fiber_length=0.06796162
        tendon_slack_length=0.2392697 pennation_angle_at_optimal=0.1951828
      PathPoint P1: tibia_r (0.01465498 -0.1272541 0.01828066)
      PathPoint P2: tibia_r (0.02388572 -0.1848676 0.01444398)
      PathPoint P3: tibia_r (0.0221728 -0.3548953 -0.01489536)
      PathPoint P4: calcn_r (0.1071777 0.01542749 -0.02898314)
      FiberForceLengthCurve: strain_at_zero_force=0.1892237 strain_at_one_norm_force=0.7076768
          stiffness_at_low_force=0.2 stiffness_at_one_norm_force=3.85763 curviness=0.75
    Millard2012EquilibriumMuscle tibpost_r: max_isometric_force=1730.154 optimal_fiber_length=0.03803232
        tendon_slack_length=0.2825053 pennation_angle_at_optimal=0.2264891
      PathPoint P1: tibia_r (-0.003901651 -0.1264781 0.01162289)
      PathPoint P2: tibia_r (-0.0156066 -0.3545073 -0.01974763)
      PathPoint P3: calcn_r (0.03833029 0.02894821 -0.02717764)
      PathPoint P4: calcn_r (0.0709616 0.01378073 -0.0267025)
      FiberForceLengthCurve: strain_at_zero_force=-0.1916705 strain_at_one_norm_force=0.6862359
          stiffness_at_low_force=0.2 stiffness_at_one_norm_force=2.278147 curviness=0.75
    Millard2012EquilibriumMuscle vasint_r: max_isometric_force=1697.361 optimal_fiber_length=0.1034279
        tendon_slack_length=0.2106165 pennation_angle_at_optimal=0.06309973
      PathPoint P1: femur_r (0.0300386 -0.2025067 0.03604093)
      PathPoint P2: femur_r (0.03469977 -0.2193472 0.0331344)
      PathPoint P3: patella_r (0.0058 0.048 -0.0006)
      PathPoint P4: patella_r (0.005 0.00247 -0.00039)
      PathPoint P5: tibia_r (0.03099434 -0.06129921 0.0004852275)
      PathWrap: wrap_object=KnExt_at_fem_r method=hybrid
      FiberForceLengthCurve: strain_at_zero_force=0.1999153 strain_at_one_norm_force=0.8514363
          stiffness_at_low_force=0.2 stiffness_at_one_norm_force=3.06974 curviness=0.75
    Millard2012EquilibriumMuscle vaslat_r: max_isometric_force=5148.767 optimal_fiber_length=0.1036811
        tendon_slack_length=0.2301026 pennation_angle_at_optimal=0.2528673
      PathPoint P1: femur_r (0.004971907 -0.195139 0.04057511)
      PathPoint P2: femur_r (0.02786339 -0.2727105 0.04755077)
      PathPoint P3: patella_r (0.0103 0.0423 0.0141)
      PathPoint P4: patella_r (0.005 0.00247 0.00733)
      PathPoint P5: tibia_r (0.03096579 -0.0614738 0.005766308)
      PathWrap: wrap_object=KnExt_at_fem_r method=hybrid
      FiberForceLengthCurve: strain_at_zero_force=0.1999632 strain_at_one_norm_force=0.8928189
          stiffness_at_low_force=0.2 stiffness_at_one_norm_force=2.886604 curviness=0.75
    Millard2012EquilibriumMuscle vasmed_r: max_isometric_force=2747.823 optimal_fiber_length=0.1006303
        tendon_slack_length=0.2078144 pennation_angle_at_optimal=0.4222225
      PathPoint P1: femur_r (0.01450139 -0.220926 0.02185708)
      PathPoint P2: femur_r (0.03687498 -0.2914455 0.001046349)
      PathPoint P3: patella_r (0.0063 0.0445 -0.017)
      PathPoint P4: patella_r (0.005 0.00247 -0.0085)
      PathPoint P5: tibia_r (0.03035675 -0.06165809 -0.007650796)
      PathWrap: wrap_object=KnExt_at_fem_r method=hybrid
      FiberForceLengthCurve: strain_at_zero_force=0.1999354 strain_at_one_norm_force=0.8518332
          stiffness_at_low_force=0.2 stiffness_at_one_norm_force=3.067965 curviness=0.75
    Millard2012EquilibriumMuscle addbrev_l: max_isometric_force=625.8197 optimal_fiber_length=0.1073843
        tendon_slack_length=0.03692342 pennation_angle_at_optimal=0.1147809
      PathPoint P1: pelvis (-0.0191528 -0.09210014 -0.01492328)
      PathPoint P2: femur_l (-0.002071628 -0.1241985 -0.028949)
      PathWrap: wrap_object=AB_at_femshaft_l method=hybrid
      FiberForceLengthCurve: strain_at_zero_force=-0.1927643 strain_at_one_norm_force=0.5015522
          stiffness_at_low_force=0.2 stiffness_at_one_norm_force=2.880531 curviness=0.75
    Millard2012EquilibriumMuscle addlong_l: max_isometric_force=916.8 optimal_fiber_length=0.1134185
        tendon_slack_length=0.138156 pennation_angle_at_optimal=0.1377704
      PathPoint P1: pelvis (-0.007600953 -0.08710321 -0.01829556)
      PathPoint P2: femur_l (0.01166326 -0.2519441 -0.01840412)
      PathWrap: wrap_object=AL_at_femshaft_l method=hybrid
      FiberForceLengthCurve: strain_at_zero_force=-0.1917374 strain_at_one_norm_force=0.5002995
          stiffness_at_low_force=0.2 stiffness_at_one_norm_force=2.890019 curviness=0.75
    Millard2012EquilibriumMuscle addmagDist_l: max_isometric_force=597.2951 optimal_fiber_length=0.188737
        tendon_slack_length=0.09306981 pennation_angle_at_optimal=0.194705
      PathPoint P1: pelvis (-0.07424466 -0.1250896 -0.03858735)
      PathPoint P2: femur_l (0.01165291 -0.2762891 -0.02243838)
      PathWrap: wrap_object=AMdist_at_femshaft_l method=hybrid
      FiberForceLengthCurve: strain_at_zero_force=-3.981963e-9 strain_at_one_norm_force=0.7 stiffness_at_low_force=0.2
          stiffness_at_one_norm_force=2.857143 curviness=0.75
    Millard2012EquilibriumMuscle addmagIsch_l: max_isometric_force=597.2951 optimal_fiber_length=0.1659834
        tendon_slack_length=0.2298934 pennation_angle_at_optimal=0.1680443
      PathPoint P1: pelvis (-0.08986773 -0.1271374 -0.04041884)
      PathPoint P2: femur_l (0.004982265 -0.40835 0.03805224)
      PathWrap: wrap_object=AMisch_at_condyles_l method=hybrid
      FiberForceLengthCurve: strain_at_zero_force=0.007389956 strain_at_one_norm_force=0.7000392
          stiffness_at_low_force=0.2 stiffness_at_one_norm_force=2.887464 curviness=0.75
    Millard2012EquilibriumMuscle addmagMid_l: max_isometric_force=597.2951 optimal_fiber_length=0.1474133
        tendon_slack_length=0.04991681 pennation_angle_at_optimal=0.2073076
      PathPoint P1: pelvis (-0.05280556 -0.1183095 -0.02765653)
      PathPoint P2: femur_l (0.00250667 -0.1709308 -0.03397148)
      PathWrap: wrap_object=AMmid_at_femshaft_l method=hybrid
      FiberForceLengthCurve: strain_at_zero_force=-3.981963e-9 strain_at_one_norm_force=0.7 stiffness_at_low_force=0.2
          stiffness_at_one_norm_force=2.857143 curviness=0.75
    Millard2012EquilibriumMuscle addmagProx_l: max_isometric_force=597.2951 optimal_fiber_length=0.1109682
        tendon_slack_length=0.04237396 pennation_angle_at_optimal=0.3114833
      PathPoint P1: pelvis (-0.03106564 -0.1053763 -0.01322746)
      PathPoint P2: femur_l (-0.01581688 -0.0830025 -0.03722679)
      PathWrap: wrap_object=AMprox_at_femshaft_l method=hybrid
      FiberForceLengthCurve: strain_at_zero_force=-3.981963e-9 strain_at_one_norm_force=0.7 stiffness_at_low_force=0.2
          stiffness_at_one_norm_force=2.857143 curviness=0.75
    Millard2012EquilibriumMuscle bflh_l: max_isometric_force=1313.184 optimal_fiber_length=0.1026416
        tendon_slack_length=0.3420265 pennation_angle_at_optimal=0.1759182
      PathPoint P1: pelvis (-0.1042875 -0.1166928 -0.056786)
      PathPoint P2: tibia_l (-0.03206967 -0.03394735 -0.02854943)
      PathPoint P3: tibia_l (-0.02731156 -0.04413155 -0.03419161)
      FiberForceLengthCurve: strain_at_zero_force=0.1965607 strain_at_one_norm_force=0.7068715
          stiffness_at_low_force=0.2 stiffness_at_one_norm_force=3.91918 curviness=0.75
    Millard2012EquilibriumMuscle bfsh_l: max_isometric_force=557.1148 optimal_fiber_length=0.114474
        tendon_slack_length=0.1098216 pennation_angle_at_optimal=0.2642232
      PathPoint P1: femur_l (0.00517907 -0.222189 -0.02720509)
      PathPoint P2: tibia_l (-0.02864383 -0.04063983 -0.03588427)
      PathWrap: wrap_object=BF_at_gastroc_l method=hybrid
      FiberForceLengthCurve: strain_at_zero_force=0.115251 strain_at_one_norm_force=0.6888986
          stiffness_at_low_force=0.2 stiffness_at_one_norm_force=3.486462 curviness=0.75
    Millard2012EquilibriumMuscle edl_l: max_isometric_force=603.4982 optimal_fiber_length=0.0679403
        tendon_slack_length=0.3616377 pennation_angle_at_optimal=0.2182582
      PathPoint P1: tibia_l (-0.01522596 -0.1122202 -0.02313294)
      PathPoint P2: tibia_l (0.0156066 -0.3646915 -0.01263848)
      PathPoint P3: calcn_l (0.08447371 0.03120166 -0.0007602136)
      PathPoint P4: calcn_l (0.1485414 0.004766921 -0.01235347)
      PathPoint P5: toes_l (0.0002869381 0.004494216 -0.01463125)
      PathPoint P6: toes_l (0.04237119 -0.0003824864 -0.02390727)
      FiberForceLengthCurve: strain_at_zero_force=0.1317998 strain_at_one_norm_force=0.7072192
          stiffness_at_low_force=0.2 stiffness_at_one_norm_force=3.475726 curviness=0.75
    Millard2012EquilibriumMuscle ehl_l: max_isometric_force=285.8675 optimal_fiber_length=0.0734455
        tendon_slack_length=0.3208776 pennation_angle_at_optimal=0.1972681
      PathPoint P1: tibia_l (-0.01332271 -0.1503383 -0.02132744)
      PathPoint P2: tibia_l (0.006756518 -0.282151 -0.01850635)
      PathPoint P3: tibia_l (0.01903244 -0.358193 0.003159621)
      PathPoint P4: calcn_l (0.08916159 0.03371513 0.02005063)
      PathPoint P5: calcn_l (0.1188515 0.02678143 0.02442186)
      PathPoint P6: calcn_l (0.1593878 0.01204731 0.02660748)
      PathPoint P7: toes_l (0.02850252 0.003920486 0.02342913)
      PathPoint P8: toes_l (0.05384872 0.003251135 0.01778701)
      FiberForceLengthCurve: strain_at_zero_force=0.1051406 strain_at_one_norm_force=0.7178208
          stiffness_at_low_force=0.2 stiffness_at_one_norm_force=3.264346 curviness=0.75
    Millard2012EquilibriumMuscle fdl_l: max_isometric_force=423.177 optimal_fiber_length=0.04372753
        tendon_slack_length=0.3713633 pennation_angle_at_optimal=0.2248391
      PathPoint P1: tibia_l (-0.002188731 -0.1776901 0.002031185)
      PathPoint P2: tibia_l (-0.01674855 -0.3535374 0.01399261)
      PathPoint P3: calcn_l (0.04007676 0.02730145 0.02660748)
      PathPoint P4: calcn_l (0.06507877 0.01525415 0.02499202)
      PathPoint P5: calcn_l (0.152402 -0.007020374 -0.0110231)
      PathPoint P6: toes_l (-0.001817275 -0.007458486 -0.01405748)
      PathPoint P7: toes_l (0.02725912 -0.006789134 -0.02056026)
      PathPoint P8: toes_l (0.0421799 -0.005737297 -0.02314224)
      FiberForceLengthCurve: strain_at_zero_force=-0.01205975 strain_at_one_norm_force=0.6997089
          stiffness_at_low_force=0.2 stiffness_at_one_norm_force=2.809902 curviness=0.75
    Millard2012EquilibriumMuscle fhl_l: max_isometric_force=907.8393 optimal_fiber_length=0.05169674
        tendon_slack_length=0.347594 pennation_angle_at_optimal=0.2580255
      PathPoint P1: tibia_l (-0.02950029 -0.2097946 -0.02256872)
      PathPoint P2: tibia_l (-0.02302926 -0.3560592 0.008576114)
      PathPoint P3: calcn_l (0.03437777 0.02392127 0.02290143)
      PathPoint P4: calcn_l (0.0954121 0.005893647 0.02432683)
      PathPoint P5: calcn_l (0.1586525 -0.004593578 0.02556218)
      PathPoint P6: toes_l (0.01482514 -0.006119783 0.02534171)
      PathPoint P7: toes_l (0.05375307 -0.009753404 0.01730887)
      FiberForceLengthCurve: strain_at_zero_force=0.01130745 strain_at_one_norm_force=0.7002505
          stiffness_at_low_force=0.2 stiffness_at_one_norm_force=2.902997 curviness=0.75
    Millard2012EquilibriumMuscle gaslat_l: max_isometric_force=1575.059 optimal_fiber_length=0.05888558
        tendon_slack_length=0.3766175 pennation_angle_at_optimal=0.2102268
      PathPoint P1: femur_l (-0.003107442 -0.4014349 -0.03220431)
      PathPoint P2: calcn_l (0.004044443 0.0268681 0.005036415)
      PathWrap: wrap_object=GasLat_at_shank_l method=hybrid
      PathWrap pathwrap_0: wrap_object=Gastroc_at_condyles_l method=hybrid
      FiberForceLengthCurve: strain_at_zero_force=-0.05983233 strain_at_one_norm_force=0.7435102
          stiffness_at_low_force=0.2 stiffness_at_one_norm_force=2.489598 curviness=0.75
    Millard2012EquilibriumMuscle gasmed_l: max_isometric_force=3115.515 optimal_fiber_length=0.05115718
        tendon_slack_length=0.3999452 pennation_angle_at_optimal=0.1656816
      PathPoint P1: femur_l (0.008286511 -0.3986983 0.0241823)
      PathPoint P2: calcn_l (0.004044443 0.0268681 0.005036415)
      PathWrap: wrap_object=GasMed_at_shank_l method=hybrid
      PathWrap pathwrap_0: wrap_object=Gastroc_at_condyles_l method=hybrid
      FiberForceLengthCurve: strain_at_zero_force=0.1998358 strain_at_one_norm_force=0.7902371
          stiffness_at_low_force=0.2 stiffness_at_one_norm_force=3.387526 curviness=0.75
    Millard2012EquilibriumMuscle glmax1_l: max_isometric_force=983.7836 optimal_fiber_length=0.1493803
        tendon_slack_length=0.04963173 pennation_angle_at_optimal=0.3540118
      PathPoint P1: pelvis (-0.1234403 0.03380271 -0.0545572)
      PathPoint P2: pelvis (-0.1260475 -0.02371089 -0.07548855)
      PathPoint P3: femur_l (-0.04599014 -0.03431247 -0.03511084)
      PathPoint P4: femur_l (-0.02869205 -0.05957319 -0.05464269)
      PathWrap: wrap_object=Gmax1_at_pelvis_l method=hybrid
      FiberForceLengthCurve: strain_at_zero_force=-0.07534176 strain_at_one_norm_force=0.8468075
          stiffness_at_low_force=0.2 stiffness_at_one_norm_force=2.168846 curviness=0.75
    Millard2012EquilibriumMuscle glmax2_l: max_isometric_force=1406.046 optimal_fiber_length=0.160223
        tendon_slack_length=0.06928079 pennation_angle_at_optimal=0.3673821
      PathPoint P1: pelvis (-0.132064 0.008524162 -0.04476985)
      PathPoint P2: pelvis (-0.1347715 -0.05966913 -0.0787833)
      PathPoint P3: femur_l (-0.04661163 -0.06146774 -0.02929778)
      PathPoint P4: femur_l (-0.0161587 -0.106937 -0.04871338)
      PathWrap: wrap_object=Gmax2_at_pelvis_l method=hybrid
      FiberForceLengthCurve: strain_at_zero_force=0.199275 strain_at_one_norm_force=0.7164175
          stiffness_at_low_force=0.2 stiffness_at_one_norm_force=3.867406 curviness=0.75
    Millard2012EquilibriumMuscle glmax3_l: max_isometric_force=947.7541 optimal_fiber_length=0.1730389
        tendon_slack_length=0.07223763 pennation_angle_at_optimal=0.3824161
      PathPoint P1: pelvis (-0.1303594 -0.05143891 -0.008721399)
      PathPoint P2: pelvis (-0.1276519 -0.1237473 -0.04215343)
      PathPoint P3: femur_l (-0.02910637 -0.1184096 -0.01092854)
      PathPoint P4: femur_l (-0.006214883 -0.149354 -0.04778329)
      PathWrap: wrap_object=Gmax3_at_pelvis_l method=hybrid
      FiberForceLengthCurve: strain_at_zero_force=0.1989714 strain_at_one_norm_force=0.7121937
          stiffness_at_low_force=0.2 stiffness_at_one_norm_force=3.896947 curviness=0.75
    Millard2012EquilibriumMuscle glmed1_l: max_isometric_force=1093.467 optimal_fiber_length=0.07714648
        tendon_slack_length=0.05898729 pennation_angle_at_optimal=0.3165559
      PathPoint P1: pelvis (-0.04913545 0.02547451 -0.1114401)
      PathPoint P2: femur_l (-0.01450139 -0.01894554 -0.06859402)
      FiberForceLengthCurve: strain_at_zero_force=-3.729382e-9 strain_at_one_norm_force=0.7 stiffness_at_low_force=0.2
          stiffness_at_one_norm_force=2.857143 curviness=0.75
    Millard2012EquilibriumMuscle glmed2_l: max_isometric_force=765.0917 optimal_fiber_length=0.08528658
        tendon_slack_length=0.07623079 pennation_angle_at_optimal=0.3165559
      PathPoint P1: pelvis (-0.08523496 0.05388838 -0.07946164)
      PathPoint P2: femur_l (-0.02278791 -0.0105253 -0.06510619)
      FiberForceLengthCurve: strain_at_zero_force=0.06397124 strain_at_one_norm_force=0.7014005
          stiffness_at_low_force=0.2 stiffness_at_one_norm_force=3.137603 curviness=0.75
    Millard2012EquilibriumMuscle glmed3_l: max_isometric_force=871.1993 optimal_fiber_length=0.08029593
        tendon_slack_length=0.04975361 pennation_angle_at_optimal=0.3165559
      PathPoint P1: pelvis (-0.1002764 0.01567662 -0.06201884)
      PathPoint P2: femur_l (-0.03200665 -0.00494689 -0.06022322)
      FiberForceLengthCurve: strain_at_zero_force=0.1252157 strain_at_one_norm_force=0.7030514
          stiffness_at_low_force=0.2 stiffness_at_one_norm_force=3.461191 curviness=0.75
    Millard2012EquilibriumMuscle glmin1_l: max_isometric_force=374.0459 optimal_fiber_length=0.08235675
        tendon_slack_length=0.01954493 pennation_angle_at_optimal=0.1745329
      PathPoint P1: pelvis (-0.03008293 0 -0.1143472)
      PathPoint P2: femur_l (0.00517907 -0.01578795 -0.06510619)
      FiberForceLengthCurve: strain_at_zero_force=-3.729382e-9 strain_at_one_norm_force=0.7 stiffness_at_low_force=0.2
          stiffness_at_one_norm_force=2.857143 curviness=0.75
    Millard2012EquilibriumMuscle glmin2_l: max_isometric_force=394.8197 optimal_fiber_length=0.0698499
        tendon_slack_length=0.03255386 pennation_angle_at_optimal=0
      PathPoint P1: pelvis (-0.06177028 0.009797887 -0.09787348)
      PathPoint P2: femur_l (0.004143256 -0.009472768 -0.06045575)
      FiberForceLengthCurve: strain_at_zero_force=0.003039474 strain_at_one_norm_force=0.7000285
          stiffness_at_low_force=0.2 stiffness_at_one_norm_force=2.869486 curviness=0.75
    Millard2012EquilibriumMuscle glmin3_l: max_isometric_force=446.7738 optimal_fiber_length=0.03701816
        tendon_slack_length=0.04955806 pennation_angle_at_optimal=0.01745329
      PathPoint P1: pelvis (-0.0791181 -0.01518672 -0.07732974)
      PathPoint P2: femur_l (-0.004143256 -0.00105253 -0.05929314)
      FiberForceLengthCurve: strain_at_zero_force=0.007461173 strain_at_one_norm_force=0.7002322
          stiffness_at_low_force=0.2 stiffness_at_one_norm_force=2.886957 curviness=0.75
    Millard2012EquilibriumMuscle grac_l: max_isometric_force=281.3115 optimal_fiber_length=0.2380774
        tendon_slack_length=0.1797744 pennation_angle_at_optimal=0.1720016
      PathPoint P1: pelvis (-0.04749091 -0.1267063 -0.02379973)
      PathPoint P2: tibia_l (-0.01752888 -0.0461199 0.03341299)
      PathPoint P3: tibia_l (0.001693888 -0.06752613 0.0177503)
      PathWrap: wrap_object=GR_at_condyles_l method=hybrid
      FiberForceLengthCurve: strain_at_zero_force=-0.1969779 strain_at_one_norm_force=0.8027483
          stiffness_at_low_force=0.2 stiffness_at_one_norm_force=2.000548 curviness=0.75
    Millard2012EquilibriumMuscle iliacus_l: max_isometric_force=1021.141 optimal_fiber_length=0.1072586
        tendon_slack_length=0.09671454 pennation_angle_at_optimal=0.279914
      PathPoint P1: pelvis (-0.06066724 0.03027547 -0.08169044)
      PathPoint P2: pelvis (-0.01353732 -0.05457423 -0.07325975)
      PathPoint P3: femur_l (-0.002382372 -0.05946794 -0.01616029)
      PathPoint P4: femur_l (-0.01263693 -0.06704615 -0.02278717)
      PathWrap: wrap_object=IL_at_brim_l method=hybrid range=(2 3)
      FiberForceLengthCurve: strain_at_zero_force=-0.1703103 strain_at_one_norm_force=0.5005449
          stiffness_at_low_force=0.2 stiffness_at_one_norm_force=2.98127 curviness=0.75
    Millard2012EquilibriumMuscle perbrev_l: max_isometric_force=521.2016 optimal_fiber_length=0.04540805
        tendon_slack_length=0.1475537 pennation_angle_at_optimal=0.2052361
      PathPoint P1: tibia_l (-0.02312442 -0.2455848 -0.02832374)
      PathPoint P2: tibia_l (-0.03225999 -0.3775915 -0.02809806)
      PathPoint P3: tibia_l (-0.02712123 -0.3883577 -0.02877512)
      PathPoint P4: calcn_l (0.04329393 0.02340125 -0.02214122)
      PathPoint P5: calcn_l (0.06222928 0.01898101 -0.03259416)
      FiberForceLengthCurve: strain_at_zero_force=-0.04234068 strain_at_one_norm_force=0.6987541
          stiffness_at_low_force=0.2 stiffness_at_one_norm_force=2.69871 curviness=0.75
    Millard2012EquilibriumMuscle perlong_l: max_isometric_force=1115.371 optimal_fiber_length=0.04986519
        tendon_slack_length=0.3261073 pennation_angle_at_optimal=0.2479525
      PathPoint P1: tibia_l (-0.01903244 -0.1331706 -0.0318219)
      PathPoint P2: tibia_l (-0.03016642 -0.3782705 -0.02674393)
      PathPoint P3: tibia_l (-0.02588412 -0.3893276 -0.02708246)
      PathPoint P4: calcn_l (0.0402606 0.0199344 -0.0210009)
      PathPoint P5: calcn_l (0.06259695 0.009187156 -0.02698758)
      PathPoint P6: calcn_l (0.07831513 0.005980319 -0.01121315)
      PathPoint P7: calcn_l (0.1105788 0.007367059 0.01748491)
      FiberForceLengthCurve: strain_at_zero_force=-0.1323481 strain_at_one_norm_force=0.6924185
          stiffness_at_low_force=0.2 stiffness_at_one_norm_force=2.424929 curviness=0.75
    Millard2012EquilibriumMuscle piri_l: max_isometric_force=1029.787 optimal_fiber_length=0.02650418
        tendon_slack_length=0.1171345 pennation_angle_at_optimal=0.1745329
      PathPoint P1: pelvis (-0.1020914 -0.00639802 -0.01309179)
      PathPoint P2: pelvis (-0.102302 -0.03004032 -0.05903418)
      PathPoint P3: femur_l (-0.01533005 -0.003789107 -0.05080608)
      FiberForceLengthCurve: strain_at_zero_force=0.09922992 strain_at_one_norm_force=0.7028348
          stiffness_at_low_force=0.2 stiffness_at_one_norm_force=3.313426 curviness=0.75
    Millard2012EquilibriumMuscle psoas_l: max_isometric_force=1426.79 optimal_fiber_length=0.1168544
        tendon_slack_length=0.09950431 pennation_angle_at_optimal=0.2155251
      PathPoint P1: pelvis (-0.06076751 0.0607469 -0.03779273)
      PathPoint P2: pelvis (-0.02055667 -0.06407818 -0.06356931)
      PathPoint P3: femur_l (-0.01367274 -0.04915314 -0.005348008)
      PathPoint P4: femur_l (-0.02434163 -0.05515256 -0.01023097)
      PathWrap: wrap_object=PS_at_brim_l method=hybrid range=(2 3)
      FiberForceLengthCurve: strain_at_zero_force=-0.09543841 strain_at_one_norm_force=0.5010382
          stiffness_at_low_force=0.2 stiffness_at_one_norm_force=3.353023 curviness=0.75
    Millard2012EquilibriumMuscle recfem_l: max_isometric_force=2191.741 optimal_fiber_length=0.07891687
        tendon_slack_length=0.4663202 pennation_angle_at_optimal=0.2170149
      PathPoint P1: pelvis (-0.02406634 -0.0380158 -0.09041184)
      PathPoint P2: patella_l (0.01 0.049 -0.0007)
      PathPoint P3: patella_l (0.0121 0.0437 0.001)
      PathPoint P4: patella_l (0.005 0.00247 -3e-5)
      PathPoint P5: tibia_l (0.03102288 -0.06122162 0.0005303649)
      PathWrap: wrap_object=KnExt_at_fem_l method=hybrid
      FiberForceLengthCurve: strain_at_zero_force=0.1999726 strain_at_one_norm_force=0.8999622
          stiffness_at_low_force=0.2 stiffness_at_one_norm_force=2.857186 curviness=0.75
    Millard2012EquilibriumMuscle sart_l: max_isometric_force=249.4131 optimal_fiber_length=0.4168569
        tendon_slack_length=0.1282635 pennation_angle_at_optimal=0.02613542
      PathPoint P1: pelvis (-0.0195539 -0.0152847 -0.1023311)
      PathPoint P2: femur_l (-0.003107442 -0.3755426 0.0489459)
      PathPoint P3: tibia_l (-0.02388572 -0.03889396 0.04118792)
      PathPoint P4: tibia_l (-0.01513079 -0.05809846 0.02979071)
      PathPoint P5: tibia_l (0.01294206 -0.07856387 0.002933934)
      FiberForceLengthCurve: strain_at_zero_force=-0.1984568 strain_at_one_norm_force=0.7212821
          stiffness_at_low_force=0.2 stiffness_at_one_norm_force=2.17453 curviness=0.75
    Millard2012EquilibriumMuscle semimem_l: max_isometric_force=2200.987 optimal_fiber_length=0.07252419
        tendon_slack_length=0.365339 pennation_angle_at_optimal=0.2545615
      PathPoint P1: pelvis (-0.09897283 -0.1116959 -0.05949932)
      PathPoint P2: tibia_l (-0.02759704 -0.04044584 0.02211735)
      PathWrap: wrap_object=SM_at_condyles_l method=hybrid
      FiberForceLengthCurve: strain_at_zero_force=0.1994426 strain_at_one_norm_force=0.7353994
          stiffness_at_low_force=0.2 stiffness_at_one_norm_force=3.731644 curviness=0.75
    Millard2012EquilibriumMuscle semiten_l: max_isometric_force=591.2951 optimal_fiber_length=0.2012915
        tendon_slack_length=0.2578189 pennation_angle_at_optimal=0.241295
      PathPoint P1: pelvis (-0.1040869 -0.1227675 -0.04990578)
      PathPoint P2: tibia_l (-0.02969061 -0.04927215 0.02584119)
      PathPoint P3: tibia_l (0.001808082 -0.07497515 0.0132027)
      PathWrap: wrap_object=ST_at_condyles_l method=hybrid
      FiberForceLengthCurve: strain_at_zero_force=0.007279189 strain_at_one_norm_force=0.7803276
          stiffness_at_low_force=0.2 stiffness_at_one_norm_force=2.58716 curviness=0.75
    Millard2012EquilibriumMuscle soleus_l: max_isometric_force=6194.843 optimal_fiber_length=0.04448196
        tendon_slack_length=0.2797873 pennation_angle_at_optimal=0.3814289
      PathPoint P1: tibia_l (-0.007232329 -0.08884506 -0.01105867)
      PathPoint P2: calcn_l (0.004044443 0.0268681 0.005036415)
      FiberForceLengthCurve: strain_at_zero_force=0.1569032 strain_at_one_norm_force=0.8506533
          stiffness_at_low_force=0.2 stiffness_at_one_norm_force=2.882882 curviness=0.75
    Millard2012EquilibriumMuscle tfl_l: max_isometric_force=411.2066 optimal_fiber_length=0.09657206
        tendon_slack_length=0.4569353 pennation_angle_at_optimal=0.05235988
      PathPoint P1: pelvis (-0.02005528 0.01077768 -0.1250067)
      PathPoint P2: femur_l (0.03045293 -0.1047267 -0.06940785)
      PathPoint P3: femur_l (0.01108321 -0.4262746 -0.03766858)
      PathPoint P4: tibia_l (0.01027752 -0.0397669 -0.03904389)
      FiberForceLengthCurve: strain_at_zero_force=0.07118385 strain_at_one_norm_force=0.7197196
          stiffness_at_low_force=0.2 stiffness_at_one_norm_force=3.08387 curviness=0.75
    Millard2012EquilibriumMuscle tibant_l: max_isometric_force=1227.452 optimal_fiber_length=0.06796162
        tendon_slack_length=0.2392697 pennation_angle_at_optimal=0.1951828
      PathPoint P1: tibia_l (0.01465498 -0.1272541 -0.01828066)
      PathPoint P2: tibia_l (0.02388572 -0.1848676 -0.01444398)
      PathPoint P3: tibia_l (0.0221728 -0.3548953 0.01489536)
      PathPoint P4: calcn_l (0.1071777 0.01542749 0.02898314)
      FiberForceLengthCurve: strain_at_zero_force=0.1892237 strain_at_one_norm_force=0.7076768
          stiffness_at_low_force=0.2 stiffness_at_one_norm_force=3.85763 curviness=0.75
    Millard2012EquilibriumMuscle tibpost_l: max_isometric_force=1730.154 optimal_fiber_length=0.03803232
        tendon_slack_length=0.2825053 pennation_angle_at_optimal=0.2264891
      PathPoint P1: tibia_l (-0.003901651 -0.1264781 -0.01162289)
      PathPoint P2: tibia_l (-0.0156066 -0.3545073 0.01974763)
      PathPoint P3: calcn_l (0.03833029 0.02894821 0.02717764)
      PathPoint P4: calcn_l (0.0709616 0.01378073 0.0267025)
      FiberForceLengthCurve: strain_at_zero_force=-0.1916705 strain_at_one_norm_force=0.6862359
          stiffness_at_low_force=0.2 stiffness_at_one_norm_force=2.278147 curviness=0.75
    Millard2012EquilibriumMuscle vasint_l: max_isometric_force=1697.361 optimal_fiber_length=0.1034282
        tendon_slack_length=0.2106173 pennation_angle_at_optimal=0.06309973
      PathPoint P1: femur_l (0.0300386 -0.2025067 -0.03604093)
      PathPoint P2: femur_l (0.03469977 -0.2193472 -0.0331344)
      PathPoint P3: patella_l (0.0058 0.048 0.0006)
      PathPoint P4: patella_l (0.005 0.00247 0.00039)
      PathPoint P5: tibia_l (0.03099434 -0.06129921 -0.0004852275)
      PathWrap: wrap_object=KnExt_at_fem_l method=hybrid
      FiberForceLengthCurve: strain_at_zero_force=0.1999153 strain_at_one_norm_force=0.8514363
          stiffness_at_low_force=0.2 stiffness_at_one_norm_force=3.06974 curviness=0.75
    Millard2012EquilibriumMuscle vaslat_l: max_isometric_force=5148.767 optimal_fiber_length=0.1036815
        tendon_slack_length=0.2301033 pennation_angle_at_optimal=0.2528673
      PathPoint P1: femur_l (0.004971907 -0.195139 -0.04057511)
      PathPoint P2: femur_l (0.02786339 -0.2727105 -0.04755077)
      PathPoint P3: patella_l (0.0103 0.0423 -0.0141)
      PathPoint P4: patella_l (0.005 0.00247 -0.00733)
      PathPoint P5: tibia_l (0.03096579 -0.0614738 -0.005766308)
      PathWrap: wrap_object=KnExt_at_fem_l method=hybrid
      FiberForceLengthCurve: strain_at_zero_force=0.1999632 strain_at_one_norm_force=0.8928189
          stiffness_at_low_force=0.2 stiffness_at_one_norm_force=2.886604 curviness=0.75
    Millard2012EquilibriumMuscle vasmed_l: max_isometric_force=2747.823 optimal_fiber_length=0.1006307
        tendon_slack_length=0.2078152 pennation_angle_at_optimal=0.4222225
      PathPoint P1: femur_l (0.01450139 -0.220926 -0.02185708)
      PathPoint P2: femur_l (0.03687498 -0.2914455 -0.001046349)
      PathPoint P3: patella_l (0.0063 0.0445 0.017)
      PathPoint P4: patella_l (0.005 0.00247 0.0085)
      PathPoint P5: tibia_l (0.03035675 -0.06165809 0.007650796)
      PathWrap: wrap_object=KnExt_at_fem_l method=hybrid
      FiberForceLengthCurve: strain_at_zero_force=0.1999354 strain_at_one_norm_force=0.8518332
          stiffness_at_low_force=0.2 stiffness_at_one_norm_force=3.067965 curviness=0.75
    CoordinateActuator lumbar_ext: coordinate=lumbar_extension optimal_force=10
    CoordinateActuator lumbar_bend: coordinate=lumbar_bending optimal_force=10
    CoordinateActuator lumbar_rot: coordinate=lumbar_rotation optimal_force=10
    CoordinateActuator shoulder_flex_r: coordinate=arm_flex_r optimal_force=10
    CoordinateActuator shoulder_add_r: coordinate=arm_add_r optimal_force=10
    CoordinateActuator shoulder_rot_r: coordinate=arm_rot_r optimal_force=10
    CoordinateActuator elbow_flex_r: coordinate=elbow_flex_r optimal_force=10
    CoordinateActuator pro_sup_r: coordinate=pro_sup_r optimal_force=10
    CoordinateActuator wrist_flex_r: coordinate=wrist_flex_r optimal_force=10
    CoordinateActuator wrist_dev_r: coordinate=wrist_dev_r optimal_force=10
    CoordinateActuator shoulder_flex_l: coordinate=arm_flex_l optimal_force=10
    CoordinateActuator shoulder_add_l: coordinate=arm_add_l optimal_force=10
    CoordinateActuator shoulder_rot_l: coordinate=arm_rot_l optimal_force=10
    CoordinateActuator elbow_flex_l: coordinate=elbow_flex_l optimal_force=10
    CoordinateActuator pro_sup_l: coordinate=pro_sup_l optimal_force=10
    CoordinateActuator wrist_flex_l: coordinate=wrist_flex_l optimal_force=10
    CoordinateActuator wrist_dev_l: coordinate=wrist_dev_l optimal_force=10
    BushingForce bushing_pelvis: socket_frame1=/bodyset/exo_Origin_base socket_frame2=/bodyset/pelvis
        rotational_stiffness=(100 100 100) [Nm/rad] translational_stiffness=(1000 1000 1000) [N/m]
        rotational_damping=(10 10 10) [Nm/(rad/s)] translational_damping=(50 50 50) [N/(m/s)]
    BushingForce bushing_femur_r: socket_frame1=/bodyset/exo_J2_R socket_frame2=/bodyset/femur_r
        rotational_stiffness=(100 100 100) translational_stiffness=(1000 1000 1000) rotational_damping=(10 10 10)
        translational_damping=(50 50 50)
    BushingForce bushing_femur_l: socket_frame1=/bodyset/exo_J2_L socket_frame2=/bodyset/femur_l
        rotational_stiffness=(100 100 100) translational_stiffness=(1000 1000 1000) rotational_damping=(10 10 10)
        translational_damping=(50 50 50)
    CoordinateActuator exo_hip_r: min_control=-30 max_control=30 coordinate=hip_flexion_r optimal_force=1
    CoordinateActuator exo_hip_l: min_control=-30 max_control=30 coordinate=hip_flexion_l optimal_force=1
    ObjectGroup right_leg: members=(addbrev_r addlong_r addmagDist_r addmagIsch_r addmagMid_r addmagProx_r bflh_r bfsh_r edl_r ehl_r fdl_r fhl_r gaslat_r gasmed_r glmax1_r glmax2_r glmax3_r glmed1_r glmed2_r glmed3_r glmin1_r glmin2_r glmin3_r grac_r iliacus_r perbrev_r perlong_r piri_r psoas_r recfem_r sart_r semimem_r semiten_r soleus_r tfl_r tibant_r tibpost_r vasint_r vaslat_r vasmed_r)
    ObjectGroup left_leg: members=(addbrev_l addlong_l addmagDist_l addmagIsch_l addmagMid_l addmagProx_l bflh_l bfsh_l edl_l ehl_l fdl_l fhl_l gaslat_l gasmed_l glmax1_l glmax2_l glmax3_l glmed1_l glmed2_l glmed3_l glmin1_l glmin2_l glmin3_l grac_l iliacus_l perbrev_l perlong_l piri_l psoas_l recfem_l sart_l semimem_l semiten_l soleus_l tfl_l tibant_l tibpost_l vasint_l vaslat_l vasmed_l)
    ObjectGroup hip_add_r: members=(addbrev_r addlong_r addmagDist_r addmagIsch_r addmagMid_r addmagProx_r bflh_r grac_r semimem_r semiten_r)
    ObjectGroup hip_abd_r: members=(glmax1_r glmed1_r glmed2_r glmed3_r glmin1_r glmin2_r glmin3_r piri_r sart_r tfl_r)
    ObjectGroup hip_flex_r: members=(addbrev_r addlong_r glmin1_r grac_r iliacus_r psoas_r recfem_r sart_r tfl_r)
    ObjectGroup hip_ext_r: members=(addlong_r addmagDist_r addmagIsch_r addmagMid_r addmagProx_r bflh_r glmax1_r glmax2_r glmax3_r glmed1_r glmed2_r glmed3_r glmin3_r semimem_r semiten_r)
    ObjectGroup hip_inrot_r: members=(glmed1_r glmed2_r glmed3_r glmin1_r iliacus_r psoas_r tfl_r)
    ObjectGroup hip_exrot_r: members=(glmin3_r piri_r)
    ObjectGroup knee_flex_r: members=(bflh_r bfsh_r gaslat_r gasmed_r grac_r sart_r semimem_r semiten_r)
    ObjectGroup knee_ext_r: members=(recfem_r vasint_r vaslat_r vasmed_r)
    ObjectGroup ankle_df_r: members=(edl_r ehl_r tibant_r)
    ObjectGroup ankle_pf_r: members=(fdl_r fhl_r gaslat_r gasmed_r perbrev_r perlong_r soleus_r tibpost_r)
    ObjectGroup everter_r: members=(edl_r perbrev_r perlong_r)
    ObjectGroup inverter_r: members=(ehl_r fdl_r fhl_r tibant_r tibpost_r)
    ObjectGroup hip_add_l: members=(addbrev_l addlong_l addmagDist_l addmagIsch_l addmagMid_l addmagProx_l bflh_l grac_l semimem_l semiten_l)
    ObjectGroup hip_abd_l: members=(glmax1_l glmed1_l glmed2_l glmed3_l glmin1_l glmin2_l glmin3_l piri_l sart_l tfl_l)
    ObjectGroup hip_flex_l: members=(addbrev_l addlong_l glmin1_l grac_l iliacus_l psoas_l recfem_l sart_l tfl_l)
    ObjectGroup hip_ext_l: members=(addlong_l addmagDist_l addmagIsch_l addmagMid_l addmagProx_l bflh_l glmax1_l glmax2_l glmax3_l glmed1_l glmed2_l glmed3_l glmin3_l semimem_l semiten_l)
    ObjectGroup hip_exrot_l: members=(glmin3_l piri_l)
    ObjectGroup hip_inrot_l: members=(glmed1_l glmed2_l glmed3_l glmin1_l iliacus_l psoas_l tfl_l)
    ObjectGroup knee_flex_l: members=(bflh_l bfsh_l gaslat_l gasmed_l grac_l sart_l semimem_l semiten_l)
    ObjectGroup knee_ext_l: members=(recfem_l vasint_l vaslat_l vasmed_l)
    ObjectGroup ankle_df_l: members=(edl_l ehl_l tibant_l)
    ObjectGroup ankle_pf_l: members=(fdl_l fhl_l gaslat_l gasmed_l perbrev_l perlong_l soleus_l tibpost_l)
    ObjectGroup everter_l: members=(edl_l perbrev_l perlong_l)
    ObjectGroup inverter_l: members=(ehl_l fdl_l fhl_l tibant_l tibpost_l)
  MarkerSet:
    Marker LHLE: humerus_l (0.01129242 -0.272957 -0.03871053) fixed=true
    Marker RHLE: humerus_r (0.01131885 -0.2748801 0.03868137) fixed=true
    Marker RRSP: radius_r (-0.03272509 -0.1996605 0.0231499) fixed=true
    Marker RUSP: radius_r (-0.04921571 -0.1964419 -0.003233621) fixed=true
    Marker LRSP: radius_l (-0.04165908 -0.1992835 -0.0215278) fixed=true
    Marker LUSP: radius_l (-0.05942027 -0.1993448 -0.006028177) fixed=true
    Marker SJN: torso (0.04134741 0.3264732 0.000460821) fixed=true
    Marker CV7: torso (-0.07937704 0.3727102 -0.00522483) fixed=true
    Marker RSAJ: torso (-0.00566764 0.3625706 0.1786533) fixed=true
    Marker LSAJ: torso (-0.007129788 0.3628144 -0.1758917) fixed=true
    Marker RASIS: pelvis (0.008950533 0.018439 0.1220275) fixed=true
    Marker LASIS: pelvis (0.01112802 0.01842761 -0.1224153) fixed=true
    Marker RPSIS: pelvis (-0.1556195 0.03288129 0.04103472) fixed=true
    Marker LPSIS: pelvis (-0.1553687 0.03286152 -0.0416328) fixed=true
    Marker RTH1: femur_r (-0.01703229 -0.1521885 0.1007816)
    Marker RTH2: femur_r (0.0490801 -0.1486855 0.07903775)
    Marker RTH3: femur_r (-0.01803088 -0.2575959 0.07695271)
    Marker RTH4: femur_r (0.0487936 -0.2545478 0.05597296)
    Marker LTH1: femur_l (0.04812931 -0.1658495 -0.07502589)
    Marker LTH2: femur_l (-0.01831016 -0.1686489 -0.09791721)
    Marker LTH3: femur_l (0.04721451 -0.2710619 -0.05360921)
    Marker LTH4: femur_l (-0.01871347 -0.2741886 -0.07709717)
    Marker RFLE: femur_r (-0.000493722 -0.427027 0.05499231) fixed=true
    Marker LFLE: femur_l (0.002647002 -0.4251914 -0.05767839) fixed=true
    Marker RSK1: tibia_r (-0.03119256 -0.1091138 0.07673351)
    Marker RSK2: tibia_r (0.02305813 -0.1019695 0.04356356)
    Marker RSK3: tibia_r (-0.02224961 -0.1956628 0.07115382)
    Marker RSK4: tibia_r (0.03178512 -0.1880938 0.03745259)
    Marker LSK1: tibia_l (0.01160198 -0.1008126 -0.05544399)
    Marker LSK2: tibia_l (-0.04787059 -0.1008223 -0.07057061)
    Marker LSK3: tibia_l (0.01147126 -0.1875115 -0.05799594)
    Marker LSK4: tibia_l (-0.04788178 -0.1874384 -0.07246983)
    Marker RFAL: tibia_r (-0.004892786 -0.3932023 0.05903035) fixed=true
    Marker LFAL: tibia_l (-0.005835941 -0.3922748 -0.05762688) fixed=true
    Marker RHAL: calcn_r (0.2226792 0.03401846 -0.01917044) fixed=true
    Marker LHAL: calcn_l (0.2213785 0.03424882 0.01127411) fixed=true
    Marker RCAL: calcn_r (-0.02046901 0.01768825 -0.005820974) fixed=true
    Marker LCAL: calcn_l (-0.02129392 0.0164522 0.004885636) fixed=true
    Marker R5MTP: calcn_r (0.1749934 0.020975 0.04767163) fixed=true
    Marker RB5MTP: calcn_r (0.1334051 0.02077265 0.04132784) fixed=true
    Marker L5MTP: calcn_l (0.1738251 0.02038858 -0.05263662) fixed=true
    Marker LB5MTP: calcn_l (0.1341105 0.02017789 -0.04519841) fixed=true
    Marker RPT: calcn_r (0.06825857 0.01740512 0.0517784) fixed=true
    Marker LPT: calcn_l (0.0647863 0.01620249 -0.05192277) fixed=true
