# OpenSim document version 40600
Model FES_urdf_0306:
  gravity: 0 -9.81 0
  Ground
  BodySet:
    Body Origin_base: mass=2.32 [kg] mass_center=(-0.10707 0.17053 -0.1096)
        inertia=(0.001834 0.00027884 0.0019287 5.8724e-7 -8.4104e-6 8.2684e-8) meshes=Origin_base.vtp
    Body J1_R: mass=0.05 mass_center=(0.006528 -0.0055065 0.0034168)
        inertia=(5.247e-6 1.1674e-5 6.895e-6 4.487e-7 -1.3581e-6 4.3204e-7) meshes=J1_R.vtp
    Body J2_R: mass=0.24 mass_center=(0.18998 -0.0039533 0.088518)
        inertia=(0.00024198 0.0010165 0.00085952 -3.5336e-5 -0.00037831 -2.576e-5) meshes=J2_R.vtp
    Body J1_L: mass=0.05 mass_center=(0 0 0) inertia=(1e-9 1e-9 1e-9 0 0 0) meshes=J1_L.vtp
    Body J2_L: mass=0.24 mass_center=(0.056315 0.021269 0.20543)
        inertia=(0.00097599 0.0010165 0.0001312 -2.2665e-5 -0.00024571 -5.5224e-5) meshes=J2_L.vtp
  JointSet:
    WeldJoint ground_to_Origin_base: socket_parent_frame=ground_offset socket_child_frame=Origin_base_offset
      PhysicalOffsetFrame ground_offset: socket_parent=/ground translation=(0 0.5 0) [meters]
          orientation=(-1.570796 0 0) [radians]
      PhysicalOffsetFrame Origin_base_offset: socket_parent=/bodyset/Origin_base translation=(0 0 0)
    PinJoint J1_R: socket_parent_frame=Origin_base_offset socket_child_frame=J1_R_offset
      Coordinate J1_R_angle: default_value=0 range=(-3.1416 3.1416) clamped=true
      PhysicalOffsetFrame Origin_base_offset: socket_parent=/bodyset/Origin_base translation=(0 0.0054908 0.00031812)
          orientation=(1.628668 0.0001147295 -0.000121569)
      PhysicalOffsetFrame J1_R_offset: socket_parent=/bodyset/J1_R translation=(0 0 0)
          orientation=(1.628668 0.0001147295 -0.000121569)
    PinJoint J2_R: socket_parent_frame=J1_R_offset socket_child_frame=J2_R_offset
      Coordinate J2_R_angle: default_value=0 range=(-3.1416 3.1416) clamped=true
      PhysicalOffsetFrame J1_R_offset: socket_parent=/bodyset/J1_R translation=(0.041121 -0.0112 0.024983)
          orientation=(-0.1435382 -0.3526982 -0.02562114)
      PhysicalOffsetFrame J2_R_offset: socket_parent=/bodyset/J2_R translation=(0 0 0)
          orientation=(-0.1435382 -0.3526982 -0.02562114)
    PinJoint J1_L: socket_parent_frame=Origin_base_offset socket_child_frame=J1_L_offset
      Coordinate J1_L_angle: default_value=0 range=(-3.1416 3.1416) clamped=true
      PhysicalOffsetFrame Origin_base_offset: socket_parent=/bodyset/Origin_base translation=(0 0.34468 0.00030255)
          orientation=(-1.628668 0.0001147295 0.000121569)
      PhysicalOffsetFrame J1_L_offset: socket_parent=/bodyset/J1_L translation=(0 0 0)
          orientation=(-1.628668 0.0001147295 0.000121569)
    PinJoint J2_L: socket_parent_frame=J1_L_offset socket_child_frame=J2_L_offset
      Coordinate J2_L_angle: default_value=0 range=(-3.1416 3.1416) clamped=true
      PhysicalOffsetFrame J1_L_offset: socket_parent=/bodyset/J1_L translation=(0.0075574 0.012454 0.047233)
          orientation=(-2.700097 1.168114 2.487009)
      PhysicalOffsetFrame J2_L_offset: socket_parent=/bodyset/J2_L translation=(0 0 0)
          orientation=(-2.700097 1.168114 2.487009)
